clock {
timezone PST+8PDT;
stoptime '2000-01-10 00:00:00';
starttime '2000-01-01 00:00:00';
};

#set minimum_timestep=60;
#set profiler=1;
#set relax_naming_rules=1;
module generators;
module tape;
module climate;
module residential {
implicit_enduses NONE;
};

module powerflow {
solver_method NR;
NR_iteration_limit 50;
};

object climate {
name "climate";
interpolate QUADRATIC;
tmyfile "climate.tmy2";
};

schedule lights1 {
     0-30 0 * * * 0.1235;
     31-59 0 * * * 0.0966;
     0-36 1 * * * 0.0982;
     37-59 1 * * * 0.0869;
     0-25 2 * * * 0.0896;
     26-59 2 * * * 0.0949;
     0-22 3 * * * 0.0989;
     23-59 3 * * * 0.0934;
     0-14 4 * * * 0.0891;
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     15-59 23 * * * 0.1951;
};

schedule lights2 {
     0-18 0 * * * 0.2395;
     19-59 0 * * * 0.2079;
     0-23 1 * * * 0.2035;
     24-59 1 * * * 0.1921;
     0-14 2 * * * 0.1886;
     15-59 2 * * * 0.1828;
     0-18 3 * * * 0.1954;
     19-59 3 * * * 0.1900;
     0-12 4 * * * 0.1976;
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     23-59 23 * * * 0.2763;
};

schedule lights3 {
     0-23 0 * * * 0.3605;
     24-59 0 * * * 0.3381;
     0-30 1 * * * 0.3297;
     31-59 1 * * * 0.3289;
     0-34 2 * * * 0.3254;
     35-59 2 * * * 0.3301;
     0-29 3 * * * 0.3255;
     30-59 3 * * * 0.3276;
     0-18 4 * * * 0.3292;
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     32-59 23 * * * 0.4231;
};

schedule plug1 {
     0-23 0 * * * 0.1605;
     24-59 0 * * * 0.1381;
     0-30 1 * * * 0.1297;
     31-59 1 * * * 0.1289;
     0-34 2 * * * 0.1254;
     35-59 2 * * * 0.1301;
     0-29 3 * * * 0.1255;
     30-59 3 * * * 0.1276;
     0-18 4 * * * 0.1292;
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     32-59 23 * * * 0.2231;
}
schedule plug2 {
     0-8 0 * * * 0.0605;
     9-59 0 * * * 0.0381;
     0-42 1 * * * 0.0297;
     43-59 1 * * * 0.0289;
     0-3 2 * * * 0.0254;
     4-59 2 * * * 0.0301;
     0-35 3 * * * 0.0555;
     36-59 3 * * * 0.0776;
     0-18 4 * * * 0.0776;
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     24-59 23 * * * 0.0231;
}
schedule plug3 {
     0-21 0 * * * 0.1605;
     22-59 0 * * * 0.1381;
     0-35 1 * * * 0.1297;
     36-59 1 * * * 0.1289;
     0-22 2 * * * 0.1254;
     23-59 2 * * * 0.1301;
     0-15 3 * * * 0.1855;
     16-59 3 * * * 0.1976;
     0-25 4 * * * 0.2292;
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     32-59 23 * * * 0.2631;
}
schedule plug4 {
     0-13 0 * * * 0.2605;
     14-59 0 * * * 0.2381;
     0-20 1 * * * 0.2297;
     21-59 1 * * * 0.2289;
     0-37 2 * * * 0.2254;
     38-59 2 * * * 0.2301;
     0-21 3 * * * 0.2255;
     22-59 3 * * * 0.2276;
     0-12 4 * * * 0.2292;
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     36-59 23 * * * 0.2631;
}
schedule plug5 {
     0-15 0 * * * 0.2605;
     16-59 0 * * * 0.2381;
     0-35 1 * * * 0.2297;
     36-59 1 * * * 0.2289;
     0-41 2 * * * 0.2254;
     42-59 2 * * * 0.2301;
     0-18 3 * * * 0.2255;
     19-59 3 * * * 0.2276;
     0-12 4 * * * 0.2292;
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     39-59 23 * * * 0.2631;
}
schedule television1 {
     * 0-3 * * * 0;
     0-23 3 * * * 0;
     24-59 3 * * * 1;
     * 4-7 * * * 0;
     0-12 8 * * * 1;
     13-59 8 * * * 0;
     * 9-11 * * * 0;
     0-25 12 * * * 0;
     26-59 12 * * * 1;
     0-8 13 * * * 1;
     9-59 13 * * * 0;
     * 14-16 * * * 0;
     0-42 17 * * * 0;
     43-59 17 * * * 1;
     * 18-21 * * * 1;
     0-53 22 * * * 1;
     54-59 22 * * * 0;
     * 23 * * * 0;
}
schedule television2 {
     * 0-5 * * * 0;
     0-35 6 * * * 0;
     36-59 6 * * * 1;
     0-5 7 * * * 1;
     6-59 7 * * * 0;
     * 8-17 * * * 0;
     0-27 18 * * * 0;
     28-59 18 * * * 1;
     * 19-20 * * * 1;
     0-43 21 * * * 1;
     44-59 21 * * * 0;
     * 22-23 * * * 0;
}
schedule television3 {
     * 0-6 * * * 1;
     0-21 7 * * * 0;
     22-59 7 * * * 1;
     0-6 8 * * * 1;
     7-59 8 * * * 0;
     * 9-14 * * * 0;
     0-23 15 * * * 0;
     24-59 15 * * * 1;
     * 16-17 * * * 1;
     0-18 18 * * * 1;
     19-59 18 * * * 1;
     * 19-23 * * * 0;
}
schedule television4 {
     * 0-5 * * * 0;
     0-37 6 * * * 0;
     38-59 6 * * * 1;
     0-22 7 * * * 1;
     23-59 7 * * * 0;
     * 8-14 * * * 0;
     0-16 15 * * * 0;
     17-59 15 * * * 1;
     * 16-19 * * * 0;
     0-25 20 * * * 1;
     26-59 20 * * * 1;
     * 21-23 * * * 0;
}
schedule television5 {
     * 0-6 * * * 0;
     0-26 7 * * * 0;
     27-59 7 * * * 1;
     0-21 8 * * * 1;
     22-59 8 * * * 0;
     * 9-14 * * * 0;
     0-2 15 * * * 0;
     3-59 15 * * * 1;
     * 16-19 * * * 1;
     0-36 20 * * * 0;
     37-59 20 * * * 1;
     0-12 21 * * * 0;
     13-59 21 * * * 1;
     * 22-23 * * * 0;
}

schedule television6 {
     * 0-6 * * * 0;
     0-12 7 * * * 0;
     13-59 7 * * * 0;
     0-21 8 * * * 0;
     22-59 8 * * * 0;
     * 9-14 * * * 0;
     0-45 15 * * * 0;
     46-59 15 * * * 1;
     * 16-19 * * * 1;
     0-36 20 * * * 1;
     37-59 20 * * * 1;
     0-12 21 * * * 0;
     13-59 21 * * * 0;
     * 22-23 * * * 0;
}
schedule fan1 {
     * 0-3 * * * 1;
     0-35 4 * * * 0;
     36-59 4 * * * 1;
     * 5-7 * * * 0;
     0-18 8 * * * 1;
     19-59 8 * * * 0;
     * 9-10 * * * 0;
     0-8 11 * * * 0;
     7-59 11 * * * 1;
     0-8 12 * * * 1;
     9-59 12 * * * 0;
     * 13-16 * * * 0;
     0-14 17 * * * 0;
     15-59 17 * * * 1;
     * 18-20 * * * 1;
     0-42 21 * * * 1;
     43-59 21 * * * 0;
     * 22-23 * * * 0;
}
schedule fan2 {
     * 0-9 * * * 0;
     0-24 10 * * * 0;
     25-59 10 * * * 1;
     0-5 10 * * * 1;
     6-59 11 * * * 0;
     * 12-15 * * * 0;
     0-27 16 * * * 0;
     28-59 16 * * * 1;
     * 17-20 * * * 1;
     0-43 21 * * * 1;
     44-59 21 * * * 0;
     * 22-23 * * * 0;
}
schedule fan3 {
     * 0-6 * * * 1;
     0-35 7 * * * 0;
     36-59 7 * * * 1;
     0-12 8 * * * 1;
     13-59 8 * * * 0;
     * 9-12 * * * 0;
     0-28 13 * * * 0;
     29-59 13 * * * 1;
     * 14-17 * * * 1;
     0-18 18 * * * 1;
     19-59 18 * * * 1;
     * 19-23 * * * 1;
}

schedule fan4 {
     * 0-6 * * * 0;
     0-41 7 * * * 1;
     42-59 7 * * * 0;
     0-18 8 * * * 1;
     19-59 8 * * * 0;
     * 9-12 * * * 0;
     0-28 13 * * * 0;
     29-59 13 * * * 0;
     * 14-17 * * * 0;
     0-24 18 * * * 1;
     25-59 18 * * * 1;
     * 19-23 * * * 0;
}

schedule fan5 {
     * 0-5 * * * 0;
     0-22 6 * * * 0;
     23-59 6 * * * 1;
     0-12 7 * * * 1;
     13-59 7 * * * 0;
     * 8-12 * * * 0;
     0-42 13 * * * 0;
     43-59 13 * * * 1;
     * 14-17 * * * 1;
     0-18 18 * * * 1;
     19-35 18 * * * 1;
	 36-59 18 * * * 0;
     * 19-23 * * * 0;
}

schedule fan6 {
     * 0-4 * * * 1;
     0-35 5 * * * 0;
     36-59 5 * * * 1;
     0-12 6 * * * 1;
     13-59 6 * * * 0;
     * 7-12 * * * 0;
     0-28 13 * * * 0;
     29-59 13 * * * 1;
     * 14-17 * * * 1;
     0-18 18 * * * 1;
     19-59 18 * * * 1;
     * 19-23 * * * 1;
}

schedule cooling1 {
     //Weekday Summer
    * 0-5 * 6-10 1-5 75;
    0-14 6 * 6-10 1-5 75;
    15-59 6 * 6-10 1-5 72;
     * 7-8 * 6-10 1-5 72;
    0-14 9 * 6-10 1-5 72;
    15-59 9 * 6-10 1-5 80;
    * 10-15 * 6-10 1-5 80;
    0-14 16 * 6-10 1-5 80;
    15-59 16 * 6-10 1-5 72;
    * 17-19 * 6-10 1-5 72;
    0-14 20 * 6-10 1-5 72;
    15-59 20 * 6-10 1-5 75;
    * 21-23 * 6-10 1-5 75;

     //Weekend Summer
    * 0-5 * 6-10 0,6 78;
    0-14 6 * 6-10 0,6 78;
    15-59 6 * 6-10 0,6 72;
     * 7-8 * 6-10 0,6 72;
    * 9-16 * 6-10 0,6 72;
    * 17-20 * 6-10 0,6 72;
    * 21-23 * 6-10 0,6 72;

     //Winter
     * * * 1-5,11-12 * 85;
}

schedule cooling2 {
     //Weekday Summer
    * 0-4 * 6-10 1-5 70;
    0-28 5 * 6-10 1-5 70;
    29-59 5 * 6-10 1-5 73;
    * 6-7 * 6-10 1-5 73;
    0-28 8 * 6-10 1-5 73;
    29-59 8 * 6-10 1-5 78;
    * 9-14 * 6-10 1-5 78;
    0-28 15 * 6-10 1-5 78;
    29-59 15 * 6-10 1-5 70;
    * 16-21 * 6-10 1-5 70;
    * 22-23 * 6-10 1-5 70;

     //Weekend Summer
    * 0-4 * 6-10 0,6 78;
    0-28 5 * 6-10 0,6 78;
    29-59 5 * 6-10 0,6 72;
    * 6-8 * 6-10 0,6 72;
    * 9-16 * 6-10 0,6 72;
    * 17-19 * 6-10 0,6 72;
    0-28 20 * 6-10 0,6 72;
    29-59 20 * 6-10 0,6 78;
    * 21-23 * 6-10 0,6 78;

     //Winter
     * * * 1-5,11-12 * 85;
}

schedule cooling3 {
     //Weekday Summer
    * 0-3 * 6-10 1-5 70;
    0-42 4 * 6-10 1-5 70;
    43-59 4 * 6-10 1-5 73;
    * 5-7 * 6-10 1-5 73;
    0-42 8 * 6-10 1-5 73;
    43-59 8 * 6-10 1-5 78;
    * 9-13 * 6-10 1-5 78;
    0-27 14 * 6-10 1-5 77;
    28-42 14 * 6-10 1-5 76;
    43-59 14 * 6-10 1-5 75;
    0-22 15 * 6-10 1-5 75;
    23-37 15 * 6-10 1-5 74;
    38-59 15 * 6-10 1-5 73;
    0-24 16 * 6-10 1-5 73;
    25-59 16 * 6-10 1-5 72;
    * 17-19 * 6-10 1-5 72;
    * 20-23 * 6-10 1-5 70;

     //Weekend Summer
    * 0-4 * 6-10 0,6 78;
    0-42 5 * 6-10 0,6 78;
    43-59 5 * 6-10 0,6 72;
    * 6-8 * 6-10 0,6 72;
    * 9-16 * 6-10 0,6 72;
    * 17-19 * 6-10 0,6 72;
    0-42 20 * 6-10 0,6 72;
    43-59 20 * 6-10 0,6 78;
    * 21-23 * 6-10 0,6 78;

     //Winter
     * * * 1-5,11-12 * 85;
}

schedule cooling4 {
     //Weekday Summer
    * 0-3 * 6-10 1-5 70;
     0-20 4 * 6-10 1-5 70;
    21-59 4 * 6-10 1-5 73;
    * 5-7 * 6-10 1-5 73;
     0-20 8 * 6-10 1-5 73;
    21-59 8 * 6-10 1-5 78;
    * 9-13 * 6-10 1-5 78;
    0-20 14 * 6-10 1-5 77;
    21-35 14 * 6-10 1-5 76;
    36-59 14 * 6-10 1-5 75;
    0-14 15 * 6-10 1-5 75;
    15-31 15 * 6-10 1-5 74;
    32-59 15 * 6-10 1-5 73;
    0-17 16 * 6-10 1-5 73;
    18-59 16 * 6-10 1-5 72;
    * 17-19 * 6-10 1-5 72;
    * 20-23 * 6-10 1-5 70;

     //Weekend Summer
    * 0-4 * 6-10 0,6 78;
    0-20 5 * 6-10 0,6 78;
    21-59 5 * 6-10 0,6 72;
    * 6-8 * 6-10 0,6 72;
    * 9-16 * 6-10 0,6 72;
    * 17-19 * 6-10 0,6 72;
    0-20 20 * 6-10 0,6 72;
    21-59 20 * 6-10 0,6 78;
    * 21-23 * 6-10 0,6 78;

     //Winter
     * * * 1-5,11-12 * 85;
}

schedule cooling5 {
     //Weekday Summer
    * 0-5 * 6-10 1-5 72;
     0-51 6 * 6-10 1-5 72;
    52-59 6 * 6-10 1-5 76;
    * 7-9 * 6-10 1-5 76;
     0-51 10 * 6-10 1-5 76;
    52-59 10 * 6-10 1-5 78;
    * 11-14 * 6-10 1-5 78;
     0-51 15 * 6-10 1-5 78;
    52-59 15 * 6-10 1-5 72;
    * 16-21 * 6-10 1-5 72;
    * 22-23 * 6-10 1-5 72;

     //Weekend Summer
    * 0-4 * 6-10 0,6 78;
    0-51 5 * 6-10 0,6 78;
    52-59 5 * 6-10 0,6 72;
    * 6-8 * 6-10 0,6 72;
    * 9-16 * 6-10 0,6 72;
    * 17-20 * 6-10 0,6 72;
    0-51 21 * 6-10 0,6 72;
    52-59 21 * 6-10 0,6 78;
    * 22-23 * 6-10 0,6 78;

     //Winter
     * * * 1-5,11-12 * 85;
}

schedule cooling6 {
	* * * 6-10 * 70;
	* * * 1-5,11-12 * 85;
}
schedule cooling7 {
	* * * 6-10 * 72;
	* * * 1-5,11-12 * 85;
}
schedule cooling8 {
	* * * 6-10 * 74;
	* * * 1-5,11-12 * 85;
}
schedule heating1 {
     //Weekday Winter
    * 0-5 * 1-5,11-12 1-5 65;
    0-14 6 * 1-5,11-12 1-5 65;
    15-59 6 * 1-5,11-12 1-5 67;
     * 7-8 * 1-5,11-12 1-5 67;
    0-14 9 * 1-5,11-12 1-5 67;
    15-59 9 * 1-5,11-12 1-5 64;
    * 10-15 * 1-5,11-12 1-5 64;
    0-14 16 * 1-5,11-12 1-5 64;
    15-59 16 * 1-5,11-12 1-5 68;
    * 17-19 * 1-5,11-12 1-5 68;
    0-14 20 * 1-5,11-12 1-5 68;
    15-59 20 * 1-5,11-12 1-5 65;
    * 21-23 * 1-5,11-12 1-5 65;

     //Weekend Winter
    * 0-5 * 1-5,11-12 0,6 68;
    0-14 6 * 1-5,11-12 0,6 68;
    15-59 6 * 1-5,11-12 0,6 68;
     * 7-8 * 1-5,11-12 0,6 68;
    * 9-16 * 1-5,11-12 0,6 68;
    * 17-20 * 1-5,11-12 0,6 68;
    * 21-23 * 1-5,11-12 0,6 68;

   //Summer
     * * * 6-10 * 60;
}
schedule heating2 {
     //Weekday Winter
    * 0-4 * 1-5,11-12 1-5 70;
    0-28 5 * 1-5,11-12 1-5 70;
    29-59 5 * 1-5,11-12 1-5 67;
    * 6-7 * 1-5,11-12 1-5 67;
    0-28 8 * 1-5,11-12 1-5 67;
    29-59 8 * 1-5,11-12 1-5 67;
    * 9-14 * 1-5,11-12 1-5 67;
    0-28 15 * 1-5,11-12 1-5 67;
    29-59 15 * 1-5,11-12 1-5 70;
    * 16-21 * 1-5,11-12 1-5 70;
    * 22-23 * 1-5,11-12 1-5 70;

     //Weekend Winter
    * 0-4 * 1-5,11-12 0,6 68;
    0-28 5 * 1-5,11-12 0,6 68;
    29-59 5 * 1-5,11-12 0,6 68;
    * 6-8 * 1-5,11-12 0,6 68;
    * 9-16 * 1-5,11-12 0,6 68;
    * 17-19 * 1-5,11-12 0,6 68;
    0-28 20 * 1-5,11-12 0,6 68;
    29-59 20 * 1-5,11-12 0,6 68;
    * 21-23 * 1-5,11-12 0,6 68;

     //Summer
     * * * 6-10 * 60;
}

schedule heating3 {
     //Weekday Winter
    * 0-3 * 1-5,11-12 1-5 70;
    0-42 4 * 1-5,11-12 1-5 70;
    43-59 5 * 1-5,11-12 1-5 67;
    * 6-7 * 1-5,11-12 1-5 67;
    0-42 8 * 1-5,11-12 1-5 67;
    43-59 8 * 1-5,11-12 1-5 62;
    * 9-13 * 1-5,11-12 1-5 62;
    0-27 14 * 1-5,11-12 1-5 63;
    28-42 14 * 1-5,11-12 1-5 64;
    43-59 14 * 1-5,11-12 1-5 65;
    0-22 15 * 1-5,11-12 1-5 65;
    23-37 15 * 1-5,11-12 1-5 66;
    38-59 15 * 1-5,11-12 1-5 67;
    0-24 16 * 1-5,11-12 1-5 67;
    25-59 16 * 1-5,11-12 1-5 68;
    * 17-19 * 1-5,11-12 1-5 68;
    * 20-23 * 1-5,11-12 1-5 69;

     //Weekend Winter
    * 0-4 * 1-5,11-12 0,6 62;
    0-42 5 * 1-5,11-12 0,6 68;
    43-59 5 * 1-5,11-12 0,6 68;
    * 6-8 * 1-5,11-12 0,6 68;
    * 9-16 * 1-5,11-12 0,6 68;
    * 17-19 * 1-5,11-12 0,6 68;
    0-42 20 * 1-5,11-12 0,6 68;
    43-59 20 * 1-5,11-12 0,6 68;
    * 21-23 * 1-5,11-12 0,6 68;

     //Summer
     * * * 6-10 * 60;
}

schedule heating4 {
     //Weekday Winter
    * 0-3 * 1-5,11-12 1-5 70;
     0-20 4 * 1-5,11-12 1-5 70;
    21-59 4 * 1-5,11-12 1-5 67;
    * 5-7 * 1-5,11-12 1-5 67;
     0-20 8 * 1-5,11-12 1-5 67;
    21-59 8 * 1-5,11-12 1-5 65;
    * 9-13 * 1-5,11-12 1-5 65;
    0-20 14 * 1-5,11-12 1-5 65;
    21-35 14 * 1-5,11-12 1-5 65;
    36-59 14 * 1-5,11-12 1-5 65;
    0-14 15 * 1-5,11-12 1-5 65;
    15-31 15 * 1-5,11-12 1-5 66;
    32-59 15 * 1-5,11-12 1-5 67;
    0-17 16 * 1-5,11-12 1-5 67;
    18-59 16 * 1-5,11-12 1-5 68;
    * 17-19 * 1-5,11-12 1-5 68;
    * 20-23 * 1-5,11-12 1-5 68;

     //Weekend Winter
    * 0-4 * 1-5,11-12 0,6 68;
    0-20 5 * 1-5,11-12 0,6 68;
    21-59 5 * 1-5,11-12 0,6 68;
    * 6-8 * 1-5,11-12 0,6 68;
    * 9-16 * 1-5,11-12 0,6 68;
    * 17-19 * 1-5,11-12 0,6 68;
    0-20 20 * 1-5,11-12 0,6 68;
    21-59 20 * 1-5,11-12 0,6 68;
    * 21-23 * 1-5,11-12 0,6 68;

     //Summer
     * * * 6-10 * 60;
}

schedule heating5 {
     //Weekday Winter
    * 0-5 * 1-5,11-12 1-5 68;
     0-51 6 * 1-5,11-12 1-5 68;
    52-59 6 * 1-5,11-12 1-5 64;
    * 7-9 * 1-5,11-12 1-5 64;
     0-51 10 * 1-5,11-12 1-5 64;
    52-59 10 * 1-5,11-12 1-5 62;
    * 11-14 * 1-5,11-12 1-5 62;
     0-51 15 * 1-5,11-12 1-5 62;
    52-59 15 * 1-5,11-12 1-5 68;
    * 16-21 * 1-5,11-12 1-5 68;
    * 22-23 * 1-5,11-12 1-5 68;

     //Weekend Winter
    * 0-4 * 1-5,11-12 0,6 68;
    0-51 5 * 1-5,11-12 0,6 68;
    52-59 5 * 1-5,11-12 0,6 68;
    * 6-8 * 1-5,11-12 0,6 68;
    * 9-16 * 1-5,11-12 0,6 68;
    * 17-20 * 1-5,11-12 0,6 68;
    0-51 21 * 1-5,11-12 0,6 68;
    52-59 21 * 1-5,11-12 0,6 68;
    * 22-23 * 1-5,11-12 0,6 68;

     //Summer
     * * * 6-10 * 60;
}

schedule heating6 {
	* * * 1-5,11-12 * 66;
	* * * 6-10 * 60;
}
schedule heating7 {
	* * * 1-5,11-12 * 64;
	* * * 6-10 * 60;
}
schedule heating8 {
	* * * 1-5,11-12 * 62;
	* * * 6-10 * 60;
}

schedule water1 {
     0-9 0 * * * 0.00;
     10-19 0 * * * 0.00;
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     0-9 3 * * * 0.08;
     10-19 3 * * * 0.00;
     20-29 3 * * * 0.00;
     30-39 3 * * * 0.00;
     40-49 3 * * * 0.00;
     50-59 3 * * * 0.00;
     0-9 4 * * * 0.00;
     10-19 4 * * * 0.49;
     20-29 4 * * * 0.00;
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     50-59 23 * * * 0.00;
}

schedule water2 {
     0-9 0 * * * 0.00;
     10-19 0 * * * 0.00;
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     0-9 3 * * * 0.04;
     10-19 3 * * * 0.00;
     20-29 3 * * * 0.00;
     30-39 3 * * * 0.00;
     40-49 3 * * * 0.00;
     50-59 3 * * * 0.00;
     0-9 4 * * * 0.00;
     10-19 4 * * * 0.00;
     20-29 4 * * * 0.00;
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     50-59 23 * * * 0.00;
}

schedule water3 {
     0-9 0 * * * 0.00;
     10-19 0 * * * 0.00;
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     50-59 4 * * * 0.01;
     0-9 5 * * * 0.00;
     10-19 5 * * * 0.00;
     20-29 5 * * * 0.00;
     30-39 5 * * * 0.13;
     40-49 5 * * * 0.00;
     50-59 5 * * * 0.06;
     0-9 6 * * * 0.11;
     10-19 6 * * * 0.00;
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     50-59 23 * * * 0.00;
}

schedule water4 {
     0-9 0 * * * 0.00;
     10-19 0 * * * 0.00;
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     20-29 4 * * * 0.08;
     30-39 4 * * * 0.00;
     40-49 4 * * * 0.00;
     50-59 4 * * * 0.00;
     0-9 5 * * * 0.00;
     10-19 5 * * * 0.00;
     20-29 5 * * * 0.00;
     30-39 5 * * * 0.00;
     40-49 5 * * * 0.11;
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     50-59 23 * * * 0.00;
}

schedule water5 {
     0-9 0 * * * 0.00;
     10-19 0 * * * 0.00;
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     20-29 5 * * * 0.11;
     30-39 5 * * * 0.00;
     40-49 5 * * * 0.00;
     50-59 5 * * * 0.00;
     0-9 6 * * * 0.11;
     10-19 6 * * * 0.41;
     20-29 6 * * * 0.42;
     30-39 6 * * * 0.50;
     40-49 6 * * * 0.00;
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     50-59 23 * * * 0.00;
}

schedule water6 {
     0-9 0 * * * 0.00;
     10-19 0 * * * 0.00;
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     0-9 3 * * * 0.03;
     10-19 3 * * * 0.00;
     20-29 3 * * * 0.00;
     30-39 3 * * * 0.00;
     40-49 3 * * * 0.00;
     50-59 3 * * * 0.00;
     0-9 4 * * * 0.00;
     10-19 4 * * * 0.00;
     20-29 4 * * * 0.00;
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     50-59 23 * * * 0.00;
}

schedule water7 {
     0-9 0 * * * 0.00;
     10-19 0 * * * 0.00;
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     10-19 5 * * * 0.40;
     20-29 5 * * * 0.00;
     30-39 5 * * * 0.00;
     40-49 5 * * * 0.00;
     50-59 5 * * * 0.00;
     0-9 6 * * * 0.00;
     10-19 6 * * * 0.00;
     20-29 6 * * * 0.00;
     30-39 6 * * * 0.14;
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     50-59 23 * * * 0.00;
}

schedule water8 {
     0-9 0 * * * 0.00;
     10-19 0 * * * 0.00;
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     30-39 2 * * * 0.03;
     40-49 2 * * * 0.00;
     50-59 2 * * * 0.00;
     0-9 3 * * * 0.00;
     10-19 3 * * * 0.00;
     20-29 3 * * * 0.00;
     30-39 3 * * * 0.00;
     40-49 3 * * * 0.00;
     50-59 3 * * * 0.00;
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     50-59 23 * * * 0.00;
}

schedule water9 {
     0-9 0 * * * 0.00;
     10-19 0 * * * 0.00;
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     10-19 5 * * * 0.36;
     20-29 5 * * * 0.00;
     30-39 5 * * * 0.11;
     40-49 5 * * * 0.00;
     50-59 5 * * * 0.05;
     0-9 6 * * * 0.08;
     10-19 6 * * * 0.00;
     20-29 6 * * * 0.11;
     30-39 6 * * * 0.22;
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     50-59 23 * * * 0.00;
}

schedule water10 {
     0-9 0 * * * 0.00;
     10-19 0 * * * 0.00;
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     50-59 6 * * * 1.20;
     0-9 7 * * * 0.00;
     10-19 7 * * * 0.00;
     20-29 7 * * * 0.00;
     30-39 7 * * * 0.00;
     40-49 7 * * * 0.00;
     50-59 7 * * * 0.00;
     0-9 8 * * * 0.00;
     10-19 8 * * * 0.00;
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     50-59 23 * * * 0.00;
}

schedule water11 {
     0-9 0 * * * 0.00;
     10-19 0 * * * 0.00;
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     50-59 5 * * * 0.30;
     0-9 6 * * * 0.00;
     10-19 6 * * * 0.22;
     20-29 6 * * * 0.22;
     30-39 6 * * * 0.66;
     40-49 6 * * * 0.00;
     50-59 6 * * * 0.00;
     0-9 7 * * * 0.00;
     10-19 7 * * * 0.00;
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     50-59 23 * * * 0.00;
}

schedule water12 {
     0-9 0 * * * 0.00;
     10-19 0 * * * 0.00;
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     10-19 5 * * * 0.77;
     20-29 5 * * * 0.00;
     30-39 5 * * * 0.00;
     40-49 5 * * * 0.00;
     50-59 5 * * * 0.00;
     0-9 6 * * * 0.00;
     10-19 6 * * * 0.11;
     20-29 6 * * * 0.11;
     30-39 6 * * * 0.00;
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     50-59 23 * * * 0.00;
}

schedule water13 {
     0-9 0 * * * 0.00;
     10-19 0 * * * 0.00;
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     30-39 5 * * * 0.92;
     40-49 5 * * * 0.00;
     50-59 5 * * * 0.00;
     0-9 6 * * * 0.11;
     10-19 6 * * * 0.11;
     20-29 6 * * * 0.09;
     30-39 6 * * * 0.11;
     40-49 6 * * * 0.00;
     50-59 6 * * * 0.00;
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     50-59 23 * * * 0.00;
}

schedule water14 {
     0-9 0 * * * 0.00;
     10-19 0 * * * 0.00;
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     20-29 6 * * * 0.11;
     30-39 6 * * * 0.00;
     40-49 6 * * * 0.00;
     50-59 6 * * * 0.76;
     0-9 7 * * * 0.00;
     10-19 7 * * * 0.00;
     20-29 7 * * * 0.00;
     30-39 7 * * * 0.00;
     40-49 7 * * * 0.00;
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     50-59 23 * * * 0.00;
}

schedule water15 {
     0-9 0 * * * 0.00;
     10-19 0 * * * 0.00;
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     30-39 5 * * * 0.11;
     40-49 5 * * * 0.11;
     50-59 5 * * * 0.71;
     0-9 6 * * * 0.00;
     10-19 6 * * * 0.00;
     20-29 6 * * * 0.11;
     30-39 6 * * * 0.00;
     40-49 6 * * * 0.00;
     50-59 6 * * * 0.00;
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     50-59 23 * * * 0.00;
}

schedule water16 {
     0-9 0 * * * 0.00;
     10-19 0 * * * 0.00;
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     50-59 5 * * * 0.11;
     0-9 6 * * * 0.11;
     10-19 6 * * * 0.11;
     20-29 6 * * * 0.11;
     30-39 6 * * * 0.11;
     40-49 6 * * * 0.11;
     50-59 6 * * * 0.00;
     0-9 7 * * * 0.00;
     10-19 7 * * * 0.00;
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     50-59 23 * * * 0.00;
}

schedule water17 {
     0-9 0 * * * 0.00;
     10-19 0 * * * 0.00;
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     50-59 5 * * * 0.82;
     0-9 6 * * * 0.00;
     10-19 6 * * * 0.00;
     20-29 6 * * * 0.14;
     30-39 6 * * * 0.00;
     40-49 6 * * * 0.00;
     50-59 6 * * * 0.00;
     0-9 7 * * * 0.00;
     10-19 7 * * * 0.00;
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     50-59 23 * * * 0.00;
}

schedule water18 {
     0-9 0 * * * 0.00;
     10-19 0 * * * 0.00;
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     50-59 5 * * * 0.63;
     0-9 6 * * * 0.00;
     10-19 6 * * * 0.00;
     20-29 6 * * * 0.00;
     30-39 6 * * * 0.00;
     40-49 6 * * * 0.00;
     50-59 6 * * * 0.00;
     0-9 7 * * * 0.00;
     10-19 7 * * * 1.72;
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     50-59 23 * * * 0.00;
}

schedule battery_schedule {
	//Summer
	0-29  0 * 6-9 * -1;
	30-59 0 * 6-9 * -1;
	0-29  1 * 6-9 * -0.8;
	30-59 1 * 6-9 * -0.6;
	0-29  2 * 6-9 * -0.4;
	30-59 2 * 6-9 * -0.4;
	0-29  3 * 6-9 * -0.2;
	30-59 3 * 6-9 * -0.2;
	0-29  4 * 6-9 * -0.2;
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	30-59 23  * 6-9 * -1;
	//Winter
	0-29  0 * 1-3,11-12 * 0;
	30-59 0 * 1-3,11-12 * 0;
	0-29  1 * 1-3,11-12 * 0;
	30-59 1 * 1-3,11-12 * 0;
	0-29  2 * 1-3,11-12 * 0;
	30-59 2 * 1-3,11-12 * 0;
	0-29  3 * 1-3,11-12 * 0.2;
	30-59 3 * 1-3,11-12 * 0.4;
	0-29  4 * 1-3,11-12 * 0.6;
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	30-59 23  * 1-3,11-12 * -0.6;
	//Spring/Fall
	0-29  0 * 4-5,10  * -0.8;
	30-59 0 * 4-5,10  * -0.8;
	0-29  1 * 4-5,10  * -0.8;
	30-59 1 * 4-5,10  * -0.8;
	0-29  2 * 4-5,10  * -0.8;
	30-59 2 * 4-5,10  * -0.8;
	0-29  3 * 4-5,10  * -0.8;
	30-59 3 * 4-5,10  * -0.8;
	0-29  4 * 4-5,10  * -0.6;
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	30-59 23  * 4-5,10  * -0.6;
}


object regulator_configuration {
Control MANUAL;
raise_taps 16;
PT_phase ABC;
name regulator_configuration_6506321;
band_center 2401;
tap_pos_A 1;
tap_pos_B 1;
time_delay 30.0;
connect_type 1;
regulation 0.10;
CT_phase ABC;
band_width 50;
tap_pos_C 1;
Type A;
lower_taps 16;
};

object triplex_line_configuration {
diameter 0.368;
name trip_line_config;
conductor_1 tlc;
conductor_2 tlc;
conductor_N tlc;
insulation_thickness 0.08;
};

object triplex_line_conductor {
resistance 0.97;
name tlc;
geometric_mean_radius 0.01111;
};

object transformer_configuration {
name fifteen_fifteen_A;
primary_voltage 4160.0V;
install_type POLETOP;
impedance1 0.012000+0.006800j;
secondary_voltage 120.0V;
connect_type SINGLE_PHASE_CENTER_TAPPED;
shunt_impedance 1728000+691200j;
impedance2 0.012000+0.006800j;
impedance 0.006000+0.013600j;
power_rating 500;
};

object transformer_configuration {
power_rating 500;
primary_voltage 4160;
install_type PADMOUNT;
secondary_voltage 480;
connect_type WYE_WYE;
resistance 0.011;
reactance 0.02;
name transformer_configuration_400;
};

object node {
phases ABCN;
name n650;
bustype SWING;
voltage_B -1200.8886-2080.000j;
voltage_C -1200.8886+2080.000j;
voltage_A 2401.7771;
nominal_voltage 2401.7771;
};

object regulator {
phases ABC;
from n650;
name Reg1;
to n630;
configuration regulator_configuration_6506321;
};

object node {
phases ABCN;
name n630;
voltage_B -1200.8886-2080.000j;
voltage_C -1200.8886+2080.000j;
voltage_A 2401.7771;
nominal_voltage 2401.7771;
};

object transformer {
phases AS;
from n630;
name T1;
to tn_1;
configuration tconf;
groupid Distribution_Trans;
};

object transformer_configuration {
name tconf;
primary_voltage 2401.777;
install_type POLETOP;
secondary_voltage 120;
connect_type SINGLE_PHASE_CENTER_TAPPED;
shunt_impedance 10000+10000j;
impedance 0.00033+0.0022j;
powerA_rating 110 kVA;
};

object transformer_configuration {
name tconf2;
primary_voltage 2401.777;
install_type POLETOP;
secondary_voltage 120;
connect_type SINGLE_PHASE_CENTER_TAPPED;
shunt_impedance 10000+10000j;
impedance 0.00033+0.0022j;
powerB_rating 110 kVA;
};

object transformer {
phases BS;
from n630;
name T2;
to tn_2;
configuration tconf2;
groupid Distribution_Trans;
};

object triplex_node {
phases AS;
nominal_voltage 120;
name tn_1;
};

object triplex_meter {
phases BS;
nominal_voltage 120;
name tn_2;
};

object triplex_line {
phases AS;
from tn_1;
name tl_1;
to tm_1;
length 100;
configuration trip_line_config;
};

object triplex_line {
phases BS;
from tn_2;
name t2;
to tm_2;
length 100;
configuration trip_line_config;
};

object triplex_meter {
phases AS;
nominal_voltage 120;
name tm_1;
};

object triplex_meter {
phases BS;
nominal_voltage 120;
name tm_2;
};

object house {
schedule_skew -810;
auxiliary_system_type ELECTRIC;
name house1;
parent tm_1;
floor_area 1838;
cooling_COP 3.2;
cooling_system_type ELECTRIC;
aux_heat_temperature_lockout 2.270706e+001;
heating_setpoint heating1*1;
motor_model BASIC;
auxiliary_strategy LOCKOUT;
air_temperature 70;
thermal_integrity_level 5;
heating_COP 3.1;
cooling_setpoint cooling7*1;
mass_temperature 70;
motor_efficiency GOOD;
heating_system_type HEAT_PUMP;
};

object waterheater {
schedule_skew -810;
tank_volume 50;
name waterheater1;
parent house1;
heating_element_capacity 4.8 kW;
thermostat_deadband 2.9;
location INSIDE;
demand water14*1;
tank_setpoint 136.8;
tank_UA 2.4;
temperature 135;
};

object ZIPload {
parent house1;
name convenienceLoads1;
power_fraction 0.100000;
current_fraction 0.100000;
base_power plug1*2.477490;
groupid plugload;
current_pf 0.950000;
power_pf 0.950000;
impedance_fraction 0.800000;
impedance_pf 0.950000;
};

object ZIPload {
parent house1;
name lights1;
power_fraction 0.003200;
current_fraction 0.425700;
base_power lights1*1.616013;
groupid lights;
current_pf -1.000000;
power_pf 1.000000;
impedance_fraction 0.571100;
impedance_pf 1.000000;
};

object ZIPload {
parent house1;
name television1;
power_fraction 0.998700;
current_fraction 0.039600;
base_power television5*0.200598;
groupid TV;
current_pf -0.540000;
power_pf -1.000000;
impedance_fraction -0.038300;
impedance_pf 0.610000;
};

object ZIPload {
parent house1;
name fan1;
power_fraction 0.013500;
current_fraction 0.253400;
base_power fan1*0.106899;
groupid fan;
current_pf 0.950000;
power_pf -1.000000;
impedance_fraction 0.733200;
impedance_pf 0.970000;
};

object house {
auxiliary_system_type ELECTRIC;
name house2;
parent tm_2;
floor_area 1838;
cooling_COP 3.2;
cooling_system_type ELECTRIC;
aux_heat_temperature_lockout 2.270706e+001;
heating_setpoint heating1*1;
motor_model BASIC;
auxiliary_strategy LOCKOUT;
air_temperature 70;
thermal_integrity_level 5;
heating_COP 3.1;
cooling_setpoint cooling7*1;
mass_temperature 70;
motor_efficiency GOOD;
heating_system_type HEAT_PUMP;
};

object waterheater {
schedule_skew -810;
tank_volume 50;
name waterheater2;
parent house2;
heating_element_capacity 4.8 kW;
thermostat_deadband 2.9;
location INSIDE;
demand water14*1;
tank_setpoint 136.8;
tank_UA 2.4;
temperature 135;
};

object ZIPload {
parent house2;
name convenienceLoads2;
power_fraction 0.100000;
current_fraction 0.100000;
base_power plug1*2.477490;
groupid plugload;
current_pf 0.950000;
power_pf 0.950000;
impedance_fraction 0.800000;
impedance_pf 0.950000;
};

object ZIPload {
parent house2;
name lights2;
power_fraction 0.003200;
current_fraction 0.425700;
base_power lights1*1.616013;
groupid lights;
current_pf -1.000000;
power_pf 1.000000;
impedance_fraction 0.571100;
impedance_pf 1.000000;
};

object ZIPload {
parent house2;
name television2;
power_fraction 0.998700;
current_fraction 0.039600;
base_power television5*0.200598;
groupid TV;
current_pf -0.540000;
power_pf -1.000000;
impedance_fraction -0.038300;
impedance_pf 0.610000;
};

object ZIPload {
parent house2;
name fan2;
power_fraction 0.013500;
current_fraction 0.253400;
base_power fan1*0.106899;
groupid fan;
current_pf 0.950000;
power_pf -1.000000;
impedance_fraction 0.733200;
impedance_pf 0.970000;
};

object battery {
power_factor 1.0;
E_Max 1000;
parent tm_1;
base_efficiency 0.86;
generator_status ONLINE;
Energy 0;
power_type DC;
V_Max 260;
generator_mode CONSTANT_PQ;
scheduled_power battery_schedule*250;
parasitic_power_draw 10 W;
I_Max 100;
P_Max 250;
name battery46;
};

object battery {
power_factor 1.0;
E_Max 1000;
parent tm_2;
base_efficiency 0.86;
generator_status ONLINE;
Energy 0;
power_type DC;
V_Max 260;
generator_mode CONSTANT_PQ;
scheduled_power battery_schedule*250;
parasitic_power_draw 10 W;
I_Max 100;
P_Max 250;
name battery47;
};
