// Generated by CymDist to DSS Converter: CymDist2Dss.exe: version 1.3.0.9
// From a file exported from CymDist Version: 4.7 Revision: 7

Compile (C:\Taylor\Projects\Green_Circuits\TVA\EPB\MDV201\Master.dss)
New energymeter.Check Transformer.mdv_sub_1 term=1

Solve
