// Tiny bit of GLM that models a "prosumer".

object house {
	name house;
	parent REPLACE_ME;
	groupid Residential;
	schedule_skew 1083;
	floor_area 3907;
	number_of_stories 1;
	ceiling_height 8;
	over_sizing_factor 0.1;
	//Thermal integrity -> Single Family 7
	Rroof 50.34;
	Rwall 27.33;
	Rfloor 35.59;
	glazing_layers 3;
	glass_type 2;
	glazing_treatment 2;
	window_frame 4;
	Rdoors 10.51;
	airchange_per_hour 0.23;
	cooling_COP 3.8;
	air_temperature 71.22;
	mass_temperature 71.22;
	total_thermal_mass_per_floor_area 3.504;
	heating_system_type GAS;
	cooling_system_type NONE;
	breaker_amps 1000;
	hvac_breaker_rating 1000;
	cooling_setpoint cooling6*2.89+69.19;
	heating_setpoint heating6*0.19+59.01;
};

object ZIPload {
	name unresponsiveLoad_house;
	parent house;
	schedule_skew 1083;
	base_power unresponsive_loads;
	heatgain_fraction 0.900;
	power_pf 1.000;
	current_pf 1.000;
	impedance_pf 1.000;
	impedance_fraction 0.200000;
	current_fraction 0.400000;
	power_fraction 0.400000;
};

object ZIPload {
	name responsiveLoad_house;
	parent house;
	schedule_skew 1083;
	base_power responsive_loads;
	heatgain_fraction 0.900;
	power_pf 1.000;
	current_pf 1.000;
	impedance_pf 1.000;
	impedance_fraction 0.200000;
	current_fraction 0.400000;
	power_fraction 0.400000;
};

object passive_controller {
	name responsiveLoad_controller_house;
	parent responsiveLoad_house;
	period 900;
	control_mode ELASTICITY_MODEL;
	two_tier_cpp true;
	observation_object Market_1;
	observation_property past_market.clearing_price;
	state_property multiplier;
	linearize_elasticity true;
	price_offset 0.01;
	critical_day cppDays.value;
	first_tier_hours 12;
	second_tier_hours 12;
	third_tier_hours 6;
	first_tier_price 0.069987;
	second_tier_price 0.139973;
	third_tier_price 0.699867;
	old_first_tier_price 0.124300;
	old_second_tier_price 0.124300;
	old_third_tier_price 0.124300;
	daily_elasticity daily_elasticity_wotech*0.1305;
	sub_elasticity_first_second -0.0099;
	sub_elasticity_first_third -0.0145;
};

object waterheater {
	name waterHeater_house;
	parent house;
	schedule_skew 4326;
	heating_element_capacity 4.5 kW;
	tank_setpoint 132.7;
	temperature 132;
	thermostat_deadband 7.8;
	location INSIDE;
	tank_UA 3.7;
	demand large_6*0.99;
	tank_volume 50;
};

object passive_controller {
	name waterHeater_controller_house;
	parent waterHeater_house;
	period 900;
	control_mode PROBABILITY_OFF;
	distribution_type NORMAL;
	observation_object Market_1;
	observation_property past_market.clearing_price;
	stdev_observation_property my_std;
	expectation_object Market_1;
	expectation_property my_avg;
	comfort_level 0.82;
	state_property override;
};

object evcharger_det {
	name ev_house;
	parent house;
	variation_mean 300.0;
	variation_std_dev 100.0;
	variation_trip_mean 300.0;
	variation_trip_std_dev 100.0;
	mileage_classification 33.0;
	work_charging_available false;
	travel_distance 15.0;
	arrival_at_work 900;
	duration_at_work 9 h;
	arrival_at_home 1800;
	duration_at_home 14 h;
	mileage_efficiency 3.846;
	maximum_charge_rate 1700;
	charging_efficiency 0.90;
};


object inverter {
	name solarInverter_house;
	parent REPLACE_ME;
	generator_status ONLINE;
	inverter_type PWM;
	generator_mode CONSTANT_PF;
};

object solar {
	name solar_house;
	parent solarInverter_house;
	generator_mode SUPPLY_DRIVEN;
	area 800 sf;
	generator_status ONLINE;
	efficiency 0.13;
	panel_type SINGLE_CRYSTAL_SILICON;
};

object inverter {
	name batteryInverter_house;
	parent REPLACE_ME;
	sense_object REPLACE_ME;
	phases REPLACE_ME;
	generator_mode CONSTANT_PQ;
	generator_status ONLINE;
	inverter_type FOUR_QUADRANT;
	four_quadrant_control_mode LOAD_FOLLOWING;
	max_charge_rate 220 kW;
	max_discharge_rate 220 kW;
	rated_power 220 kW;
	charge_on_threshold 5123 kW;
	charge_off_threshold 6148 kW;
	discharge_on_threshold 7915 kW;
	discharge_off_threshold 7454 kW;
	inverter_efficiency 0.9;
	charge_lockout_time 60;
	discharge_lockout_time 60;
};

object battery {
	name battery_house;
	parent batteryInverter_house;
	generator_mode SUPPLY_DRIVEN;
	generator_status ONLINE;
	use_internal_battery_model TRUE;
	battery_type LI_ION;
	round_trip_efficiency 0.92;
	battery_capacity 7 kWh;
	state_of_charge 1.0;
	battery_state FULL;
};

// Single Phase Windturb_dg OPTIONAL.
//object inverter {
//	name windInverter_house;
//	phases REPLACE_ME;
//	parent REPLACE_ME;
//	rated_power 10000;
//	generator_status ONLINE;
//	inverter_type four_quadrant;
//	four_quadrant_control_mode CONSTANT_PF;
//	pf = 1;
//};
//
//object rectifier {
//	name rectifier_house;
//	parent windInverter_house;
//	phases ABCN;
//	rectifier_type SIX_PULSE;
//	generator_mode SUPPLY_DRIVEN;
//};
//
//object windturb_dg {
//	name wind_house;
//	parent rectifier_house;
//	phases ABCN;
//	Gen_status ONLINE;
//	Gen_mode CONSTANTP;
//	//Turbine_Model BERGEY_10kW;
//	turbine_height = 24;
//	blade_diam = 7;
//	Rated_VA = 10000;
//	Rated_V = 360;
//	Max_P = 15000;
//	Max_Q = 4000;
//	pf = 0.95;
//	q = 0;
//	CP_Data = GENERAL_SMALL;
//	cut_in_ws = 2;
//	cut_out_ws = 20;
//	Cp_max = 0.28;
//	Cp_rated = 0.275;
//	ws_maxcp = 8.2;
//	ws_rated = 12.5;
//	Gen_type = SYNCHRONOUS;
//	Rs = 0.05;
//	Xs = 0.200;
//	Rg = 0.000;
//	Xg = 0.000;
//};
