clock {
	timezone PST+8PDT;
	starttime '2012-04-01 00:00:00';
	stoptime '2012-04-02 00:00:00';
};
#include "schedules.glm";
#set minimum_timestep=3600;
#set profiler=1;
#set relax_naming_rules=1;
module generators;
module tape;
module residential {
	implicit_enduses NONE;
};
module powerflow {
	solver_method NR;
	NR_iteration_limit 50;
};

object regulator_configuration {
	Control MANUAL;
	raise_taps 16;
	PT_phase ABC;
	name regulator_configuration_6506321;
	band_center 2401;
	tap_pos_A 1;
	tap_pos_B 1;
	time_delay 30.0;
	connect_type 1;
	regulation 0.10;
	CT_phase ABC;
	band_width 50;
	tap_pos_C 1;
	Type A;
	lower_taps 16;
};

object triplex_line_configuration {
	diameter 0.368;
	name trip_line_config;
	conductor_1 tlc;
	conductor_2 tlc;
	conductor_N tlc;
	insulation_thickness 0.08;
};

object triplex_line_conductor {
	resistance 0.97;
	name tlc;
	geometric_mean_radius 0.01111;
};

object transformer_configuration {
	name fifteen_fifteen_A;
	primary_voltage 4160.0V;
	install_type POLETOP;
	impedance1 0.012000+0.006800j;
	secondary_voltage 120.0V;
	connect_type SINGLE_PHASE_CENTER_TAPPED;
	shunt_impedance 1728000+691200j;
	impedance2 0.012000+0.006800j;
	impedance 0.006000+0.013600j;
	power_rating 500;
};

object transformer_configuration {
	power_rating 500;
	primary_voltage 4160;
	install_type PADMOUNT;
	secondary_voltage 480;
	connect_type WYE_WYE;
	resistance 0.011;
	reactance 0.02;
	name transformer_configuration_400;
};

object node {
	phases ABCN;
	name n650;
	bustype SWING;
	voltage_B -1200.8886-2080.000j;
	voltage_C -1200.8886+2080.000j;
	voltage_A 2401.7771;
	nominal_voltage 2401.7771;
};

object regulator {
	phases ABC;
	from n650;
	name Reg1;
	to n630;
	configuration regulator_configuration_6506321;
	groupid swingKids;
};

object node {
	phases ABCN;
	name n630;
	voltage_B -1200.8886-2080.000j;
	voltage_C -1200.8886+2080.000j;
	voltage_A 2401.7771;
	nominal_voltage 2401.7771;
};

object transformer {
	phases AS;
	from n630;
	name T1;
	to tn_1;
	configuration tconf;
	groupid Distribution_Trans;
};

object transformer_configuration {
	name tconf;
	primary_voltage 2401.777;
	install_type POLETOP;
	secondary_voltage 120;
	connect_type SINGLE_PHASE_CENTER_TAPPED;
	shunt_impedance 10000+10000j;
	impedance 0.00033+0.0022j;
	powerA_rating 110 kVA;
};

object transformer_configuration {
	name tconf2;
	primary_voltage 2401.777;
	install_type POLETOP;
	secondary_voltage 120;
	connect_type SINGLE_PHASE_CENTER_TAPPED;
	shunt_impedance 10000+10000j;
	impedance 0.00033+0.0022j;
	powerB_rating 110 kVA;
};

object transformer {
	phases BS;
	from n630;
	name T2;
	to tn_2;
	configuration tconf2;
	groupid Distribution_Trans;
};

object triplex_node {
	phases AS;
	nominal_voltage 120;
	name tn_1;
};

object triplex_meter {
	phases BS;
	nominal_voltage 120;
	name tn_2;
};

object triplex_line {
	phases AS;
	from tn_1;
	name tl_1;
	to tm_1;
	length 100;
	configuration trip_line_config;
};

object triplex_line {
	phases BS;
	from tn_2;
	name t2;
	to tm_2;
	length 100;
	configuration trip_line_config;
};

object triplex_meter {
	phases AS;
	nominal_voltage 120;
	name tm_1;
};

object triplex_meter {
	phases BS;
	nominal_voltage 120;
	name tm_2;
};

object house {
	schedule_skew -810;
	auxiliary_system_type ELECTRIC;
	name house1;
	parent tm_1;
	floor_area 1838;
	cooling_COP 3.2;
	cooling_system_type ELECTRIC;
	aux_heat_temperature_lockout 2.270706e+001;
	heating_setpoint heating1*1;
	motor_model BASIC;
	auxiliary_strategy LOCKOUT;
	air_temperature 70;
	thermal_integrity_level 5;
	heating_COP 3.1;
	cooling_setpoint cooling7*1;
	mass_temperature 70;
	motor_efficiency GOOD;
	heating_system_type HEAT_PUMP;
};

object waterheater {
	schedule_skew -810;
	tank_volume 50;
	name waterheater1;
	parent house1;
	heating_element_capacity 4.8 kW;
	thermostat_deadband 2.9;
	location INSIDE;
	water_demand water14*1;
	tank_setpoint 136.8;
	tank_UA 2.4;
	temperature 135;
};

object ZIPload {
	parent house1;
	name convenienceLoads1;
	power_fraction 0.100000;
	current_fraction 0.100000;
	base_power plug1*2.477490;
	groupid plugload;
	current_pf 0.950000;
	power_pf 0.950000;
	impedance_fraction 0.800000;
	impedance_pf 0.950000;
};

object ZIPload {
	parent house1;
	name lights1;
	power_fraction 0.003200;
	current_fraction 0.425700;
	base_power lights1*1.616013;
	groupid lights;
	current_pf -1.000000;
	power_pf 1.000000;
	impedance_fraction 0.571100;
	impedance_pf 1.000000;
};

object ZIPload {
	parent house1;
	name television1;
	power_fraction 0.998700;
	current_fraction 0.039600;
	base_power television5*0.200598;
	groupid TV;
	current_pf -0.540000;
	power_pf -1.000000;
	impedance_fraction -0.038300;
	impedance_pf 0.610000;
};

object ZIPload {
	parent house1;
	name fan1;
	power_fraction 0.013500;
	current_fraction 0.253400;
	base_power fan1*0.106899;
	groupid fan;
	current_pf 0.950000;
	power_pf -1.000000;
	impedance_fraction 0.733200;
	impedance_pf 0.970000;
};

object house {
	auxiliary_system_type ELECTRIC;
	name house2;
	parent tm_2;
	floor_area 1838;
	cooling_COP 3.2;
	cooling_system_type ELECTRIC;
	aux_heat_temperature_lockout 2.270706e+001;
	heating_setpoint heating1*1;
	motor_model BASIC;
	auxiliary_strategy LOCKOUT;
	air_temperature 70;
	thermal_integrity_level 5;
	heating_COP 3.1;
	cooling_setpoint cooling7*1;
	mass_temperature 70;
	motor_efficiency GOOD;
	heating_system_type HEAT_PUMP;
};

object waterheater {
	schedule_skew -810;
	tank_volume 50;
	name waterheater2;
	parent house2;
	heating_element_capacity 4.8 kW;
	thermostat_deadband 2.9;
	location INSIDE;
	water_demand water14*1;
	tank_setpoint 136.8;
	tank_UA 2.4;
	temperature 135;
};

object ZIPload {
	parent house2;
	name convenienceLoads2;
	power_fraction 0.100000;
	current_fraction 0.100000;
	base_power plug1*2.477490;
	groupid plugload;
	current_pf 0.950000;
	power_pf 0.950000;
	impedance_fraction 0.800000;
	impedance_pf 0.950000;
};

object ZIPload {
	parent house2;
	name lights2;
	power_fraction 0.003200;
	current_fraction 0.425700;
	base_power lights1*1.616013;
	groupid lights;
	current_pf -1.000000;
	power_pf 1.000000;
	impedance_fraction 0.571100;
	impedance_pf 1.000000;
};

object ZIPload {
	parent house2;
	name television2;
	power_fraction 0.998700;
	current_fraction 0.039600;
	base_power television5*0.200598;
	groupid TV;
	current_pf -0.540000;
	power_pf -1.000000;
	impedance_fraction -0.038300;
	impedance_pf 0.610000;
};

object ZIPload {
	parent house2;
	name fan2;
	power_fraction 0.013500;
	current_fraction 0.253400;
	base_power fan1*0.106899;
	groupid fan;
	current_pf 0.950000;
	power_pf -1.000000;
	impedance_fraction 0.733200;
	impedance_pf 0.970000;
};

object recorder {
	interval 3600;
	parent Reg1;
	limit 0;
	file Regulator_Reg1.csv;
	property tap_A,tap_B,tap_C,power_in_A.real,power_in_A.imag,power_in_B.real,power_in_B.imag,power_in_C.real,power_in_C.imag,power_in.real,power_in.imag,phases;
};

object collector {
	interval 3600;
	group class=triplex_meter;
	limit 0;
	file VoltageJiggle.csv;
	property min(voltage_12.mag),mean(voltage_12.mag),max(voltage_12.mag),std(voltage_12.mag);
};

object collector {
	interval 3600;
	group class=triplex_line;
	limit 0;
	file TriplexLosses.csv;
	property sum(power_losses_A.real),sum(power_losses_A.imag),sum(power_losses_B.real),sum(power_losses_B.imag),sum(power_losses_C.real),sum(power_losses_C.imag);
};

object collector {
	interval 3600;
	group class=transformer;
	limit 0;
	file TransformerLosses.csv;
	property sum(power_losses_A.real),sum(power_losses_A.imag),sum(power_losses_B.real),sum(power_losses_B.imag),sum(power_losses_C.real),sum(power_losses_C.imag);
};

object collector {
	interval 3600;
	group class=regulator AND groupid=swingKids;
	limit 0;
	file SwingKids_regulator.csv;
	property sum(power_in.real),sum(power_in.imag);
};

object group_recorder {
	property voltage_A;
	group "class=node";
	interval 3600;
	file aVoltDump.csv;
};

object group_recorder {
	property voltage_B;
	group "class=node";
	interval 3600;
	file bVoltDump.csv;
};

object group_recorder {
	property voltage_C;
	group "class=node";
	interval 3600;
	file cVoltDump.csv;
};

object recorder {
	interval 3600;
	limit 0;
	parent waterheater1;
	property is_waterheater_on;
	file waterheater1_on.csv;
};

object group_recorder {
	group "class=waterheater";
	interval 3600;
	property is_waterheater_on;
	file all_waterheaters_on.csv;
};

object collector {
	interval 3600;
	limit 0;
	group class=waterheater;
	property sum(actual_power.mag);
	file waterheaterActualPower.csv;
};

object collector {
	interval 3600;
	limit 0;
	group class=triplex_meter;
	property sum(measured_power.mag);
	file allMeterPower.csv;
};
