clear
new object=circuit.newmodel

!redirect vsource.dss
edit object=vsource.source bus1=bx basekv=115 pu=1.0475 angle=0 frequency=60 phases=3 mvasc3=20000 mvasc1=21000 x1r1=4 x0r0=3

!redirect linecode.dss
new object=linecode.3x_336aa_1/0asn nphases=3 basefreq=60 normamps=396 emergamps=495 r1=0.05284 x1=0.12447 r0=0.14504 x0=0.41903 c1=3.3005 c0=1.438 units=kft
new object=linecode.3x_336aa_2cun nphases=3 basefreq=60 normamps=396 emergamps=495 r1=0.05284 x1=0.12447 r0=0.14504 x0=0.41903 c1=3.3005 c0=1.438 units=kft
new object=linecode.3x_336as_1/0asn nphases=3 basefreq=60 normamps=415.2 emergamps=519 r1=0.05189 x1=0.1218 r0=0.14409 x0=0.41636 c1=3.3397 c0=1.4454 units=kft
new object=linecode.3x_397aa_1/0asn nphases=3 basefreq=60 normamps=480 emergamps=600 r1=0.04489 x1=0.124 r0=0.1385 x0=0.41087 c1=3.3137 c0=1.4824 units=kft
new object=linecode.3x_397as_1/0asn nphases=3 basefreq=60 normamps=536 emergamps=670 r1=0.04409 x1=0.12089 r0=0.13771 x0=0.40777 c1=3.4184 c0=1.503 units=kft
new object=linecode.3x_397as_2asn nphases=3 basefreq=60 normamps=536 emergamps=670 r1=0.04362 x1=0.11782 r0=0.15472 x0=0.44165 c1=3.4557 c0=1.4619 units=kft
new object=linecode.3x_397as_2cun nphases=3 basefreq=60 normamps=536 emergamps=670 r1=0.04362 x1=0.11782 r0=0.14235 x0=0.40936 c1=3.4557 c0=1.4601 units=kft
new object=linecode.3x_4/0aa_1/0aan nphases=3 basefreq=60 normamps=316 emergamps=395 r1=0.08314 x1=0.14623 r0=0.17705 x0=0.44241 c1=3.196 c0=1.4178 units=kft
new object=linecode.3x_4/0aa_4/0aan nphases=3 basefreq=60 normamps=316 emergamps=395 r1=0.08314 x1=0.14623 r0=0.14784 x0=0.41426 c1=3.196 c0=1.4253 units=kft
new object=linecode.3x_4/0cu_1/0asn nphases=3 basefreq=60 normamps=405.6 emergamps=507 r1=0.05265 x1=0.12977 r0=0.14485 x0=0.42434 c1=3.1678 c0=1.4123 units=kft
new object=linecode.3x_4/0cu_1/0cun nphases=3 basefreq=60 normamps=405.6 emergamps=507 r1=0.05265 x1=0.13125 r0=0.13108 x0=0.39297 c1=3.1309 c0=1.4429 units=kft
new object=linecode.3x_4/0cu_2cun nphases=3 basefreq=60 normamps=405.6 emergamps=507 r1=0.05265 x1=0.12977 r0=0.15138 x0=0.42131 c1=3.1678 c0=1.4061 units=kft
new object=linecode.3x_477aa_1/0asn nphases=3 basefreq=60 normamps=570.4 emergamps=713 r1=0.03731 x1=0.12199 r0=0.13093 x0=0.40888 c1=3.3737 c0=1.4943 units=kft
new object=linecode.3x_477aa_4/0asn nphases=3 basefreq=60 normamps=570.4 emergamps=713 r1=0.03731 x1=0.12199 r0=0.10167 x0=0.38123 c1=3.3737 c0=1.503 units=kft
new object=linecode.477acsr nphases=3 basefreq=60 normamps=570.4 emergamps=713 r1=0.03731 x1=0.12199 r0=0.10167 x0=0.38123 c1=3.3737 c0=1.503 units=kft
new object=linecode.unbalanced_336_acsr nphases=3 basefreq=60 normamps=570.4 emergamps=713 rmatrix=[0.08684550,0.02983050,0.02888830|0.02983050,0.08879660,0.02983050|0.02888830,0.02983050,0.08684550] xmatrix=[0.20254490,0.08472100,0.07191610|0.08472100,0.19614520,0.08472100|0.07191610,0.08472100,0.20254490] cmatrix=[2.74000000,-0.70000000,-0.34000000|-0.70000000,2.96000000,-0.71000000|-0.34000000,-0.71000000,2.74000000] units=kft

!redirect loadshape.dss
new object=loadshape.default interval=1 npts=24 mult=[0.677,0.6256,0.6087,0.5833,0.58028,0.6025,0.657,0.7477,0.832,0.88,0.94,0.989,0.985,0.98,0.9898,0.999,1,0.958,0.936,0.913,0.876,0.876,0.828,0.756] mean=0.826 stddev=0.2
new object=loadshape.wind2400 interval=0.000277778 npts=2501 mult=[317.611221,317.3934584,316.9820228,316.634582,316.3729109,316.1687186,315.9720352,315.7844252,315.6447931,315.5911655,315.649421,315.8260992,316.0869335,316.4135473,316.8646908,317.4613432,318.1546745,318.9159842,319.7142778,320.5764724,321.4848611,322.3857204,323.2943744,324.2005717] action=normalize mean=0.603 stddev=0.2
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
!redirect growthshape.dss
new object=growthshape.default npts=2 year=(1,20) mult=(1.0249999999999999,1.0249999999999999)

!redirect tcc_curve.dss
new object=tcc_curve.a npts=15 c_array=[1.1,1.3,1.5,2,3,4,5,6,7,8,9,10,20,50,100] t_array=[7.1769,2.2079,1.234,0.534,0.2215,0.134,0.0965,0.0769,0.0653,0.0578,0.0528,0.0492,0.0378,0.0346,0.0342]
new object=tcc_curve.d npts=5 c_array=[1,2.5,4.5,8,14] t_array=[6,0.7,0.2,0.06,0.02]
new object=tcc_curve.tlink npts=7 c_array=[2,2.1,3,4,6,22,50] t_array=[300,100,10.1,4,1.4,0.1,0.02]
new object=tcc_curve.klink npts=6 c_array=[2,2.2,3,4,6,30] t_array=[300,20,4,1.3,0.41,0.02]
new object=tcc_curve.uv1547 npts=2 c_array=[0.5,0.9] t_array=[0.166,2]
new object=tcc_curve.ov1547 npts=2 c_array=[1.1,1.2] t_array=[2,0.166]
new object=tcc_curve.mod_inv npts=15 c_array=[1.1,1.3,1.5,2,3,4,5,6,7,8,9,10,20,50,100] t_array=[27.1053,9.9029,6.439,3.8032,2.4322,1.9458,1.6883,1.5255,1.4117,1.3267,1.2604,1.2068,0.9481,0.7468,0.6478]
new object=tcc_curve.very_inv npts=15 c_array=[1.1,1.3,1.5,2,3,4,5,6,7,8,9,10,20,50,100] t_array=[93.872,28.9113,16.179,7.0277,2.9423,1.7983,1.3081,1.0513,0.8995,0.8023,0.7361,0.6891,0.5401,0.4988,0.493]
new object=tcc_curve.ext_inv npts=15 c_array=[1.1,1.3,1.5,2,3,4,5,6,7,8,9,10,20,50,100] t_array=[134.407,40.9913,22.6817,9.5217,3.6467,2.0017,1.2967,0.9274,0.7092,0.5693,0.4742,0.4065,0.1924,0.133,0.1245]
new object=tcc_curve.definite npts=3 c_array=[1,1.001,100] t_array=[300,1,1]
new object=tcc_curve.b npts=15 c_array=[1.1,1.3,1.5,2,3,4,5,6,7,8,9,10,20,50,100] t_array=[51.9557,16.1006,9.0457,3.9338,1.6027,0.9286,0.6315,0.4721,0.3759,0.3131,0.2697,0.2383,0.1343,0.1022,0.097]
new object=tcc_curve.c npts=15 c_array=[1.1,1.3,1.5,2,3,4,5,6,7,8,9,10,20,50,100] t_array=[125.257,38.0345,20.962,8.7258,3.3034,1.802,1.1647,0.8336,0.6394,0.5156,0.432,0.3728,0.1882,0.1389,0.1321]

!redirect spectrum.dss
new object=spectrum.default numharm=7 harmonic=(1,3,5,7,9,11,13) %mag=(100,33,20,14.000000000000002,11,9,7.0000000000000009) angle=(0,0,0,0,0,0,0)
new object=spectrum.defaultload numharm=7 harmonic=(1,3,5,7,9,11,13) %mag=(100,1.5,20,14.000000000000002,1,9,7.0000000000000009) angle=(0,180,180,180,180,180,180)
new object=spectrum.defaultgen numharm=7 harmonic=(1,3,5,7,9,11,13) %mag=(100,5,3,1.5,1,0.69999999999999996,0.5) angle=(0,0,0,0,0,0,0)
new object=spectrum.defaultvsource numharm=1 harmonic=(1) %mag=(100) angle=(0)
new object=spectrum.linear numharm=1 harmonic=(1) %mag=(100) angle=(0)
new object=spectrum.pwm6 numharm=13 harmonic=(1,3,5,7,9,11,13,15,17,19,21,23,25) %mag=(100,4.4000000000000004,76.5,62.700000000000003,2.8999999999999999,24.800000000000001,12.699999999999999,0.5,7.0999999999999996,8.4000000000000004,0.90000000000000013,4.4000000000000004,3.3000000000000003) angle=(-103,-5,28,-180,-33,-59,79,36,-253,-124,3,-30,86)
new object=spectrum.dc6 numharm=10 harmonic=(1,3,5,7,9,11,13,15,17,19) %mag=(100,1.2,33.600000000000001,1.6000000000000001,0.40000000000000002,8.6999999999999993,1.2,0.29999999999999999,4.5,1.3) angle=(-75,28,156,29,-91,49,54,148,-57,-46)

!redirect line.dss
new object=line.l1 bus1=b0 bus2=b1 linecode=unbalanced_336_acsr normamps=570.39999999999998 emergamps=713 length=10 units=kft
new object=line.l2 bus1=b1 bus2=b2 linecode=unbalanced_336_acsr normamps=570.39999999999998 emergamps=713 length=10 units=kft
new object=line.l3 bus1=bm bus2=b3 linecode=unbalanced_336_acsr normamps=570.39999999999998 emergamps=713 length=10 units=kft
new object=line.l4 bus1=b3 bus2=b4 linecode=unbalanced_336_acsr normamps=570.39999999999998 emergamps=713 length=10 units=kft
new object=line.l5 bus1=b2 bus2=b5 linecode=unbalanced_336_acsr normamps=570.39999999999998 emergamps=713 length=10 units=kft
new object=line.l6 bus1=b3 bus2=b6 linecode=unbalanced_336_acsr normamps=570.39999999999998 emergamps=713 length=10 units=kft
new object=line.l7 bus1=b0 bus2=b7 linecode=unbalanced_336_acsr normamps=570.39999999999998 emergamps=713 length=10 units=kft
new object=line.motorleads bus1=bg bus2=bg2 length=0.01

!redirect load.dss
new object=load.ldb0 bus1=b0 conn=wye phases=3 kw=0.10000000000000001 pf=1 model=2 kv=12.470000000000001
new object=load.ldb1 bus1=b1 conn=wye phases=3 kw=0.10000000000000001 pf=1 model=2 kv=12.470000000000001
new object=load.ldb2 bus1=b2 conn=wye phases=3 kw=0.10000000000000001 pf=1 model=2 kv=12.470000000000001
new object=load.ldb3 bus1=b3 conn=wye phases=3 kw=0.10000000000000001 pf=1 model=2 kv=12.470000000000001
new object=load.ldb4 bus1=b4 conn=wye phases=3 kw=0.10000000000000001 pf=1 model=2 kv=12.470000000000001
new object=load.ldb5 bus1=b5 conn=wye phases=3 kw=0.10000000000000001 pf=1 model=2 kv=12.470000000000001
new object=load.ldb6 bus1=b6 conn=wye phases=3 kw=0.10000000000000001 pf=1 model=2 kv=12.470000000000001
new object=load.ldb7 bus1=b7 conn=wye phases=3 kw=0.10000000000000001 pf=1 model=2 kv=12.470000000000001

!redirect transformer.dss
new object=transformer.sub phases=3 windings=2 buses=[bx,b0] conns=[delta,wye] kvs=[115,12.47] kvas=[20000,20000] taps=[1,1] xhl=7
new object=transformer.tg phases=3 windings=2 buses=[b4,bg] conns=[wye,wye] kvs=[12.47,0.48] kvas=[1500,1500] taps=[1,1] xhl=5
new object=transformer.reg1a phases=1 windings=2 buses=[b2.1,bm.1] conns=[wye,wye] kvs=[12.47,12.47] kvas=[2000,2000] xhl=1
new object=transformer.reg1b phases=1 windings=2 buses=[b2.2,bm.2] conns=[wye,wye] kvs=[12.47,12.47] kvas=[2000,2000] xhl=1
new object=transformer.reg1c phases=1 windings=2 buses=[b2.3,bm.3] conns=[wye,wye] kvs=[12.47,12.47] kvas=[2000,2000] xhl=1

!redirect regcontrol.dss
new object=regcontrol.reg1a transformer=reg1a winding=2 tapwinding=2 vreg=119.9926 band=3 ptratio=60 delay=15 tapdelay=2 reversible=yes revvreg=119.9926 revband=3 ctprim=600 r=5 x=3 revr=5 revx=3
new object=regcontrol.reg1b transformer=reg1b winding=2 tapwinding=2 vreg=119.9926 band=3 ptratio=60 delay=15 tapdelay=2 reversible=yes revvreg=119.9926 revband=3 ctprim=600 r=5 x=3 revr=5 revx=3
new object=regcontrol.reg1c transformer=reg1c winding=2 tapwinding=2 vreg=119.9926 band=3 ptratio=60 delay=15 tapdelay=2 reversible=yes revvreg=119.9926 revband=3 ctprim=600 r=5 x=3 revr=5 revx=3
new object=regcontrol.sub transformer=sub winding=2 tapwinding=2 vreg=119.9926 band=3 ptratio=60 delay=10 tapdelay=2

!redirect capacitor.dss
new object=capacitor.c1 conn=wye bus1=b1 phases=3 kvar=[600] kv=12.47
new object=capacitor.c2 conn=wye bus1=b3 phases=3 kvar=[600] kv=12.47
new object=capacitor.cg conn=wye bus1=bg phases=3 kvar=[600] kv=0.48

!redirect fault.dss
new object=fault.thefault normamps=0 emergamps=0 faultrate=0 pctperm=0 repair=0 bus1=b3.1 bus2=b3.0 phases=1 r=0.0001 ontime=.3 temporary=yes

!redirect relay.dss
new object=relay.mfrov/uv monitoredobj=line.motorleads monitoredterm=1 type=voltage recloseintervals=(none) kvbase=0.48 shots=1 delay=0
new object=relay.mfr46 monitoredobj=line.motorleads monitoredterm=1 type=46,46baseamps=1800,46%pickup=20,46isqt=1 delay=0.1
new object=relay.mfr47 monitoredobj=line.motorleads monitoredterm=1 type=47 kvbase=0.48,47%pickup=2 delay=0.1

!redirect recloser.dss
new object=recloser.cb1 monitoredobj=line.l1 monitoredterm=1 numfast=4 phasefast=ext_inv phasedelayed=ext_inv phasetrip=800 tdphfast=1 tdphdelayed=1 phaseinst=2400 groundfast=ext_inv grounddelayed=ext_inv groundtrip=800 tdgrfast=1 tdgrdelayed=1 groundinst=1200 shots=4 recloseintervals=(0.5,2,2)
new object=recloser.cb2 monitoredobj=line.l7 monitoredterm=1 numfast=4 phasefast=ext_inv phasedelayed=ext_inv phasetrip=800 tdphfast=1 tdphdelayed=1 phaseinst=2400 groundfast=ext_inv grounddelayed=ext_inv groundtrip=800 tdgrfast=1 tdgrdelayed=1 groundinst=1200 shots=4 recloseintervals=(0.5,2,2)
new object=recloser.rec1 monitoredobj=line.l3 monitoredterm=1 numfast=1 phasefast=a phasedelayed=c phasetrip=280 tdphfast=1 tdphdelayed=1 shots=4 recloseintervals=(0.5,2,2)
new object=recloser.rec2 monitoredobj=line.l5 monitoredterm=1 numfast=1 phasefast=a phasedelayed=c phasetrip=400 tdphfast=1 tdphdelayed=1 shots=4 recloseintervals=(0.5,2,2)

!redirect fuse.dss
new object=fuse.f1 monitoredobj=line.l6 monitoredterm=1 fusecurve=klink ratedcurrent=65
new object=fuse.f2 monitoredobj=transformer.tg monitoredterm=1 fusecurve=tlink ratedcurrent=65

!redirect indmach012.dss
new object=indmach012.motor1 bus1=bg2 kw=1200 conn=delta kva=1500 h=6 duty=wind2400 purs=0.048 puxs=0.075 purr=0.018 puxr=0.12 puxm=3.8 slip=0.02 slipoption=variableslip kv=0.48

!redirect monitor.dss
new object=monitor.cb1 element=line.l1 terminal=1 mode=0
new object=monitor.cb2 element=line.l7 terminal=1 mode=0
new object=monitor.rec1 element=line.l3 terminal=1 mode=0
new object=monitor.rec2 element=line.l5 terminal=1 mode=0
new object=monitor.f1 element=line.l6 terminal=1 mode=0
new object=monitor.f2 element=transformer.tg terminal=1 mode=0
new object=monitor.mfr2 element=indmach012.motor1 terminal=1 mode=3
new object=monitor.src element=vsource.source terminal=1 mode=0
// new object=monitor.src2 element=vsource.source terminal=1 mode=0
makebuslist

!redirect busvoltagebases.dss  ! set voltage bases
set voltagebases=(115,12.470000000000001,0.47999999999999998)

!buscoords buscoords.dss


!powerflow code
set maxiterations=1000
set maxcontroliter=1000
calcv
solve
show quantity=voltage

// indmach012 test example run file

!compile "master.dss"

// new object=monitor.mtime element=vsource.source mode=5   ! solution time monitor

set maxcontroliter=20
set maxiterations=20
solve

/*  this script shows selected reports

show busflow bg2 kva elem

show powers kva elements
show isolated

*/

// this dynamic simulation applies a slg fault at 0.3 s
// relays then operate about 0.1 s later, isolating the induction motor

set mode=dynamics number=1 h=0.000166667
solve
solve number=5000


!get time
!get number

// various monitor exporting commands

export monitor object=cb1 channels=(1,3,5)
export monitor object=cb1 channels=(7,9,11)

export monitor object=f1 channels=(1,3,5)
export monitor object=f1 channels=(7,9,11)

export monitor object=f2 channels=(1,3,5)
export monitor object=f2 channels=(7,9,11)


export monitor object=mfr2 channels=(1,2,3,4,5,6)
export monitor object=mfr2 channels=(7,8,9,10,11,12)
export monitor object=mfr2 channels=(14,15,16,17)   !  stator and rotor currents

export monitor object=src channels=(1,3,5)
export monitor object=src channels=(7,9,11)
// export monitor object=src2

show variables
