clear
new object=circuit.lvtest
edit object=vsource.source bus1=sourcebus.1.2.3 basekv=11 pu=1.05 isc3=3000 isc1=5
new object=linecode.2c_007 nphases=3 r1=3.97 x1=0.099 r0=3.97 x0=0.099 c1=0 c0=0 units=km
new object=linecode.2c_0225 nphases=3 r1=1.257 x1=0.085 r0=1.257 x0=0.085 c1=0 c0=0 units=km
new object=linecode.2c_16 nphases=3 r1=1.15 x1=0.088 r0=1.2 x0=0.088 c1=0 c0=0 units=km
new object=linecode.35_sac_xsc nphases=3 r1=0.868 x1=0.092 r0=0.76 x0=0.092 c1=0 c0=0 units=km
new object=linecode.4c_06 nphases=3 r1=0.469 x1=0.075 r0=1.581 x0=0.091 c1=0 c0=0 units=km
new object=linecode.4c_1 nphases=3 r1=0.274 x1=0.073 r0=0.959 x0=0.079 c1=0 c0=0 units=km
new object=linecode.4c_35 nphases=3 r1=0.089 x1=0.0675 r0=0.319 x0=0.076 c1=0 c0=0 units=km
new object=linecode.4c_185 nphases=3 r1=0.166 x1=0.068 r0=0.58 x0=0.078 c1=0 c0=0 units=km
new object=linecode.4c_70 nphases=3 r1=0.446 x1=0.071 r0=1.505 x0=0.083 c1=0 c0=0 units=km
new object=linecode.4c_95_sac_xc nphases=3 r1=0.322 x1=0.074 r0=0.804 x0=0.093 c1=0 c0=0 units=km
new object=loadshape.default npts=24 interval=1 mult=[0.677,0.6256,0.6087,0.5833,0.58028,0.6025,0.657,0.7477,0.832,0.88,0.94,0.989,0.985,0.98,0.9898,0.999,1,0.958,0.936,0.913,0.876,0.876,0.828,0.756] useactual=no
new object=loadshape.shape_1 npts=1440 minterval=1 mult=[0.036,0.036,0.036,0.036,0.036,0.036,0.036,0.036,0.036,0.036,0.036,0.036,0.036,0.036,0.036,0.036,0.036,0.036,0.036,0.036,0.036,0.036,0.036,0.036] useactual=no
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new object=loadshape.shape_2 npts=1440 minterval=1 mult=[0.044,0.044,0.044,0.044,0.044,0.044,0.044,0.044,0.044,0.044,0.044,0.044,0.044,0.044,0.044,0.044,0.044,0.044,0.044,0.044,0.044,0.044,0.044,0.044] useactual=no
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new object=loadshape.shape_3 npts=1440 minterval=1 mult=[0.054,0.054,0.054,0.054,0.054,0.054,0.054,0.054,0.054,0.054,0.054,0.054,0.054,0.054,0.054,0.054,0.054,0.054,0.054,0.054,0.054,0.054,0.054,0.054] useactual=no
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new object=loadshape.shape_4 npts=1440 minterval=1 mult=[0.048,0.048,0.048,0.227,0.227,0.227,0.227,0.227,0.227,0.227,0.227,0.227,0.227,0.227,0.227,0.227,0.227,0.227,0.227,0.227,0.227,0.227,0.227,0.227] useactual=no
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new object=loadshape.shape_5 npts=1440 minterval=1 mult=[0.035,0.035,0.035,0.035,0.035,0.035,0.147,0.147,0.147,0.279,0.035,0.035,0.035,0.035,0.035,0.035,0.035,0.035,0.035,0.035,0.035,0.035,0.035,0.035] useactual=no
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new object=loadshape.shape_6 npts=1440 minterval=1 mult=[0.052,0.052,0.052,0.052,0.052,0.052,0.052,0.052,0.052,0.052,0.052,0.052,0.052,0.052,0.052,0.052,0.052,0.052,0.052,0.052,0.052,0.052,0.052,0.052] useactual=no
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new object=loadshape.shape_7 npts=1440 minterval=1 mult=[0.055,0.055,0.055,0.055,0.055,0.055,0.055,0.055,0.055,0.055,0.055,0.055,0.055,0.055,0.055,0.055,0.055,0.055,0.055,0.055,0.055,0.055,0.055,0.055] useactual=no
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new object=loadshape.shape_8 npts=1440 minterval=1 mult=[0.043,0.043,0.043,0.043,0.043,0.043,0.043,0.043,0.043,0.043,0.043,0.043,0.043,0.043,0.043,0.043,0.043,0.043,0.043,0.043,0.043,0.043,0.043,0.043] useactual=no
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new object=loadshape.shape_9 npts=1440 minterval=1 mult=[0.059,0.059,0.059,0.059,0.059,0.059,0.059,0.059,0.059,0.059,0.059,0.059,0.059,0.059,0.059,0.059,0.059,0.059,0.059,0.059,0.059,0.059,0.281,0.281] useactual=no
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new object=loadshape.shape_10 npts=1440 minterval=1 mult=[0.057,0.057,0.057,0.057,0.057,0.057,0.057,0.057,0.057,0.057,0.057,0.057,0.057,0.057,0.057,0.057,0.057,0.057,0.057,0.057,0.057,0.057,0.057,0.057] useactual=no
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new object=loadshape.shape_11 npts=1440 minterval=1 mult=[0.049,0.049,0.049,0.049,0.049,0.049,0.049,0.049,0.049,0.049,0.049,0.049,0.049,0.049,0.049,0.049,0.049,0.049,0.049,0.049,0.049,0.049,0.049,0.049] useactual=no
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new object=loadshape.shape_12 npts=1440 minterval=1 mult=[0.092,0.092,0.092,0.092,0.092,0.092,0.092,0.092,0.092,0.092,0.092,0.174,0.174,0.174,0.174,0.174,2.23,2.23,2.23,0.174,0.174,0.174,0.191,0.251] useactual=no
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new object=loadshape.shape_13 npts=1440 minterval=1 mult=[0.056,0.056,0.056,0.056,0.056,0.056,0.056,0.056,0.056,0.056,0.056,0.056,0.056,0.056,0.056,0.056,0.056,0.056,0.056,0.056,0.056,0.056,0.056,0.056] useactual=no
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new object=loadshape.shape_14 npts=1440 minterval=1 mult=[0.049,0.049,0.049,0.049,0.049,0.049,0.049,0.049,0.049,0.049,0.049,0.049,0.049,0.049,0.049,0.049,0.049,0.049,0.049,0.049,0.049,0.049,0.049,0.049] useactual=no
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new object=loadshape.shape_15 npts=1440 minterval=1 mult=[0.053,0.053,0.053,0.053,0.053,0.053,0.053,0.053,0.053,0.053,0.053,0.053,0.053,0.053,0.053,0.053,0.053,0.053,0.053,0.053,0.053,0.053,0.053,0.053] useactual=no
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new object=loadshape.shape_16 npts=1440 minterval=1 mult=[0.087,0.064,0.164,0.307,0.307,0.307,0.307,0.342,0.342,0.207,0.247,0.247,0.247,0.247,0.247,0.363,0.363,0.363,0.363,0.363,0.363,0.363,0.363,0.363] useactual=no
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new object=loadshape.shape_17 npts=1440 minterval=1 mult=[0.048,0.048,0.048,0.048,0.048,0.048,0.048,0.048,0.048,0.048,0.048,0.048,0.048,0.048,0.048,0.048,0.048,0.048,0.048,0.048,0.048,0.048,0.048,0.048] useactual=no
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new object=loadshape.shape_18 npts=1440 minterval=1 mult=[0.049,0.049,0.049,0.049,0.049,0.049,0.049,0.049,0.049,0.049,0.049,0.049,0.049,0.049,0.049,0.049,0.049,0.049,0.049,0.049,0.049,0.049,0.049,0.049] useactual=no
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new object=loadshape.shape_19 npts=1440 minterval=1 mult=[0.053,0.053,0.053,0.053,0.235,0.235,0.235,0.235,0.235,0.235,0.235,0.235,0.235,0.235,0.235,0.235,0.235,0.235,0.235,0.235,0.235,0.235,0.235,0.235] useactual=no
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new object=loadshape.shape_20 npts=1440 minterval=1 mult=[0.051,0.051,0.051,0.051,0.051,0.051,0.051,0.051,0.051,0.051,0.051,0.051,0.051,0.051,0.051,0.051,0.051,0.051,0.051,0.051,0.051,0.051,0.051,0.051] useactual=no
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new object=loadshape.shape_21 npts=1440 minterval=1 mult=[0.045,0.045,0.045,0.045,0.045,0.045,0.045,0.045,0.045,0.045,0.045,0.045,0.045,0.045,0.045,0.045,0.045,0.045,0.045,0.045,0.045,0.045,0.045,0.045] useactual=no
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new object=loadshape.shape_22 npts=1440 minterval=1 mult=[0.054,0.054,0.054,0.054,0.054,0.054,0.054,0.054,0.054,0.054,0.054,0.054,0.054,0.054,0.054,0.054,0.054,0.054,0.054,0.054,0.054,0.054,0.054,0.054] useactual=no
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new object=loadshape.shape_23 npts=1440 minterval=1 mult=[0.055,0.085,0.085,0.085,0.085,0.085,0.085,0.085,0.085,0.085,0.085,0.085,0.085,0.085,0.085,0.085,0.185,0.185,0.185,0.125,0.125,0.125,0.125,0.125] useactual=no
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new object=loadshape.shape_24 npts=1440 minterval=1 mult=[0.054,0.054,0.054,0.054,0.054,0.054,0.054,0.054,0.054,0.054,0.054,0.054,0.054,0.054,0.054,0.054,0.054,0.054,0.054,0.054,0.054,0.054,0.054,0.054] useactual=no
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new object=loadshape.shape_25 npts=1440 minterval=1 mult=[0.05,0.05,0.05,0.05,0.05,0.05,0.05,0.05,0.05,0.05,0.191,0.191,0.191,0.191,0.191,0.191,0.191,0.191,0.191,0.191,0.191,0.191,0.191,0.191] useactual=no
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new object=loadshape.shape_26 npts=1440 minterval=1 mult=[0.034,0.034,0.034,0.034,0.034,0.034,0.034,0.034,0.034,0.034,0.034,0.034,0.034,0.034,0.034,0.034,0.034,0.034,0.034,0.034,0.034,0.034,0.034,0.034] useactual=no
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new object=loadshape.shape_27 npts=1440 minterval=1 mult=[0.051,0.051,0.051,0.051,0.051,0.051,0.051,0.051,0.051,0.051,0.051,0.051,0.051,0.051,0.051,0.051,0.051,0.051,0.051,0.051,0.051,0.051,0.051,0.051] useactual=no
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new object=loadshape.shape_28 npts=1440 minterval=1 mult=[0.028,0.028,0.028,0.028,0.028,0.028,0.078,0.138,0.29,0.29,0.29,0.403,0.403,0.468,0.408,0.408,0.408,0.408,0.343,0.343,0.343,0.356,0.356,0.356] useactual=no
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new object=loadshape.shape_29 npts=1440 minterval=1 mult=[0.054,0.054,0.054,0.054,0.054,0.054,0.054,0.054,0.054,0.054,0.054,0.054,0.054,0.054,0.054,0.054,0.054,0.054,0.054,0.054,0.054,0.054,0.054,0.054] useactual=no
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new object=loadshape.shape_30 npts=1440 minterval=1 mult=[0.053,0.053,0.053,0.053,0.053,0.053,0.053,0.053,0.053,0.053,0.053,0.053,0.053,0.053,0.053,0.053,0.053,0.053,0.053,0.053,0.053,0.053,0.053,0.053] useactual=no
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new object=loadshape.shape_31 npts=1440 minterval=1 mult=[0.053,0.053,0.053,0.053,0.053,0.053,0.053,0.053,0.053,0.053,0.053,0.053,0.053,0.053,0.053,0.053,0.053,0.053,0.053,0.053,0.053,0.053,0.053,0.053] useactual=no
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new object=loadshape.shape_32 npts=1440 minterval=1 mult=[0.056,0.056,0.056,0.056,0.056,0.056,0.056,0.056,0.056,0.056,0.056,0.056,0.056,0.056,0.056,0.056,0.056,0.056,0.056,0.056,0.056,0.056,0.056,0.056] useactual=no
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new object=loadshape.shape_33 npts=1440 minterval=1 mult=[0.057,0.057,0.057,0.057,0.057,0.057,0.057,0.057,0.057,0.057,0.057,0.057,0.057,0.057,0.057,0.057,0.057,0.057,0.057,0.057,0.057,0.057,0.057,0.25] useactual=no
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new object=loadshape.shape_34 npts=1440 minterval=1 mult=[0.045,0.045,0.045,0.045,0.045,0.045,0.045,0.045,0.045,0.045,0.045,0.045,0.045,0.045,0.045,0.045,0.045,0.045,0.045,0.045,0.045,0.045,0.045,0.228] useactual=no
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new object=loadshape.shape_35 npts=1440 minterval=1 mult=[0.043,0.043,0.043,0.043,0.043,0.161,0.161,0.161,0.161,0.161,0.161,0.161,0.161,0.161,0.161,0.161,0.161,0.161,0.161,0.161,0.161,0.161,0.161,0.043] useactual=no
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new object=loadshape.shape_36 npts=1440 minterval=1 mult=[0.055,0.055,0.055,0.055,0.055,0.055,0.055,0.055,0.055,0.055,0.055,0.055,0.055,0.055,0.055,0.055,0.055,0.055,0.055,0.055,0.055,0.055,0.055,0.055] useactual=no
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new object=loadshape.shape_37 npts=1440 minterval=1 mult=[0.045,0.045,0.045,0.045,0.045,0.045,0.045,0.045,0.045,0.045,0.045,0.045,0.045,0.045,0.045,0.045,0.045,0.045,0.045,0.045,0.045,0.045,0.045,0.045] useactual=no
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new object=loadshape.shape_38 npts=1440 minterval=1 mult=[0.052,0.052,0.052,0.052,0.052,0.052,0.052,0.052,0.052,0.052,0.052,0.052,0.052,0.052,0.052,0.052,0.052,0.052,0.052,0.052,0.052,0.052,0.052,0.052] useactual=no
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new object=loadshape.shape_39 npts=1440 minterval=1 mult=[0.048,0.048,0.048,0.048,0.048,0.048,0.048,0.048,0.048,0.048,0.048,0.048,0.048,0.048,0.048,0.048,0.048,0.048,0.048,0.048,0.048,0.048,0.048,0.048] useactual=no
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new object=loadshape.shape_40 npts=1440 minterval=1 mult=[0.043,0.043,0.043,0.043,0.043,0.043,0.043,0.043,0.043,0.043,0.043,0.043,0.043,0.043,0.043,0.043,0.043,0.043,0.043,0.043,0.043,0.043,0.043,0.043] useactual=no
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new object=loadshape.shape_41 npts=1440 minterval=1 mult=[0.052,0.052,0.052,0.052,0.052,0.052,0.052,0.052,0.052,0.052,0.052,0.052,0.052,0.052,0.052,0.052,0.052,0.052,0.052,0.052,0.052,0.052,0.052,0.052] useactual=no
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new object=loadshape.shape_42 npts=1440 minterval=1 mult=[0.054,0.054,0.054,0.084,0.184,0.224,0.224,0.237,0.237,0.237,0.365,0.365,0.365,0.425,0.425,0.425,0.365,0.365,0.365,0.365,0.365,0.365,0.365,0.365] useactual=no
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new object=loadshape.shape_43 npts=1440 minterval=1 mult=[0.05,0.05,0.05,0.05,0.05,0.05,0.05,0.05,0.05,0.05,0.05,0.05,0.05,0.05,0.05,0.05,0.05,0.05,0.05,0.05,0.05,0.05,0.05,0.05] useactual=no
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new object=loadshape.shape_44 npts=1440 minterval=1 mult=[0.029,0.029,0.029,0.029,0.029,0.029,0.029,0.029,0.029,0.029,0.029,0.029,0.029,0.029,0.029,0.029,0.029,0.029,0.029,0.029,0.029,0.029,0.029,0.029] useactual=no
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new object=loadshape.shape_45 npts=1440 minterval=1 mult=[0.053,0.053,0.053,0.053,0.113,0.113,0.113,0.113,0.113,0.113,0.053,0.053,0.053,0.053,0.053,0.053,0.053,0.053,0.053,0.053,0.053,0.053,0.053,0.053] useactual=no
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new object=loadshape.shape_46 npts=1440 minterval=1 mult=[0.062,0.062,0.122,0.162,0.222,0.162,0.162,0.162,0.162,0.259,0.259,0.259,0.199,0.199,0.199,0.159,0.159,0.159,0.159,0.199,0.199,0.199,0.199,0.199] useactual=no
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new object=loadshape.shape_47 npts=1440 minterval=1 mult=[0.045,0.045,0.045,0.045,0.045,0.045,0.045,0.045,0.045,0.045,0.045,0.045,0.045,0.045,0.045,0.045,0.045,0.045,0.045,0.045,0.045,0.045,0.045,0.045] useactual=no
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new object=loadshape.shape_48 npts=1440 minterval=1 mult=[0.046,0.046,0.046,0.046,0.046,0.046,0.046,0.046,0.046,0.046,0.046,0.046,0.046,0.046,0.046,0.046,0.046,0.046,0.046,0.046,0.046,0.046,0.046,0.046] useactual=no
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new object=loadshape.shape_49 npts=1440 minterval=1 mult=[0.054,0.054,0.054,0.054,0.054,0.054,0.054,0.054,0.054,0.054,0.256,0.256,0.256,0.256,0.256,0.256,0.256,0.256,0.256,0.256,0.256,0.256,0.256,0.256] useactual=no
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new object=loadshape.shape_50 npts=1440 minterval=1 mult=[0.052,0.052,0.052,0.052,0.052,0.052,0.052,0.052,0.052,0.052,0.052,0.052,0.052,0.052,0.052,0.052,0.052,0.052,0.052,0.052,0.052,0.052,0.052,0.052] useactual=no
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new object=loadshape.shape_51 npts=1440 minterval=1 mult=[0.053,0.053,0.053,0.053,0.053,0.053,0.053,0.053,0.053,0.053,0.053,0.053,0.053,0.053,0.053,0.053,0.053,0.053,0.053,0.053,0.053,0.053,0.053,0.053] useactual=no
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new object=loadshape.shape_52 npts=1440 minterval=1 mult=[0.052,0.052,0.052,0.052,0.052,0.052,0.052,0.052,0.052,0.052,0.052,0.052,0.052,0.052,0.052,0.052,0.052,0.052,0.052,0.052,0.052,0.052,0.052,0.052] useactual=no
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new object=loadshape.shape_53 npts=1440 minterval=1 mult=[0.047,0.047,0.047,0.047,0.047,0.047,0.047,0.047,0.047,0.047,0.047,0.047,0.047,0.047,0.047,0.047,0.047,0.047,0.047,0.047,0.047,0.047,0.047,0.047] useactual=no
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new object=loadshape.shape_54 npts=1440 minterval=1 mult=[0.048,0.048,0.057,0.048,0.048,0.048,0.048,0.148,0.148,2.331,0.048,0.048,0.048,0.048,0.048,0.048,0.048,0.048,0.048,0.048,0.048,0.048,0.048,0.048] useactual=no
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new object=loadshape.shape_55 npts=1440 minterval=1 mult=[0.055,0.055,0.055,0.055,0.055,0.055,0.055,0.055,0.055,0.055,0.055,0.055,0.055,0.055,0.055,0.055,0.055,0.055,0.055,0.055,0.055,0.055,0.055,0.055] useactual=no
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new object=growthshape.default npts=2 year=[1,20] mult=[1.025,1.025]
new object=tcc_curve.a npts=5 c_array=[1,2.5,4.5,8,14] t_array=[0.15,0.07,0.05,0.045,0.045]
new object=tcc_curve.d npts=5 c_array=[1,2.5,4.5,8,14] t_array=[6,0.7,0.2,0.06,0.02]
new object=tcc_curve.tlink npts=7 c_array=[2,2.1,3,4,6,22,50] t_array=[300,100,10.1,4,1.4,0.1,0.02]
new object=tcc_curve.klink npts=6 c_array=[2,2.2,3,4,6,30] t_array=[300,20,4,1.3,0.41,0.02]
new object=tcc_curve.uv1547 npts=2 c_array=[0.5,0.9] t_array=[0.166,2]
new object=tcc_curve.ov1547 npts=2 c_array=[1.1,1.2] t_array=[2,0.166]
new object=tcc_curve.mod_inv npts=15 c_array=[1.1,1.3,1.5,2,3,4,5,6,7,8,9,10,20,50,100] t_array=[27.1053,9.9029,6.439,3.8032,2.4322,1.9458,1.6883,1.5255,1.4117,1.3267,1.2604,1.2068,0.9481,0.7468,0.6478]
new object=tcc_curve.very_inv npts=15 c_array=[1.1,1.3,1.5,2,3,4,5,6,7,8,9,10,20,50,100] t_array=[93.872,28.9113,16.179,7.0277,2.9423,1.7983,1.3081,1.0513,0.8995,0.8023,0.7361,0.6891,0.5401,0.4988,0.493]
new object=tcc_curve.ext_inv npts=15 c_array=[1.1,1.3,1.5,2,3,4,5,6,7,8,9,10,20,50,100] t_array=[134.407,40.9913,22.6817,9.5217,3.6467,2.0017,1.2967,0.9274,0.7092,0.5693,0.4742,0.4065,0.1924,0.133,0.1245]
new object=tcc_curve.definite npts=3 c_array=[1,1.001,100] t_array=[300,1,1]
new object=spectrum.default numharm=7 harmonic=[1,3,5,7,9,11,13] %mag=[100,33,20,14,11,9,7] angle=[0,0,0,0,0,0,0]
new object=spectrum.defaultload numharm=7 harmonic=[1,3,5,7,9,11,13] %mag=[100,1.5,20,14,1,9,7] angle=[0,180,180,180,180,180,180]
new object=spectrum.defaultgen numharm=7 harmonic=[1,3,5,7,9,11,13] %mag=[100,5,3,1.5,1,0.7,0.5] angle=[0,0,0,0,0,0,0]
new object=spectrum.defaultvsource numharm=1 harmonic=[1] %mag=[100] angle=[0]
new object=spectrum.linear numharm=1 harmonic=[1] %mag=[100] angle=[0]
new object=spectrum.pwm6 numharm=13 harmonic=[1,3,5,7,9,11,13,15,17,19,21,23,25] %mag=[100,4.4,76.5,62.7,2.9,24.8,12.7,0.5,7.1,8.4,0.9,4.4,3.3] angle=[-103,-5,28,-180,-33,-59,79,36,-253,-124,3,-30,86]
new object=spectrum.dc6 numharm=10 harmonic=[1,3,5,7,9,11,13,15,17,19] %mag=[100,1.2,33.6,1.6,0.4,8.7,1.2,0.3,4.5,1.3] angle=[-75,28,156,29,-91,49,54,148,-57,-46]
new object=line.line1 bus1=1.1.2.3 bus2=15.1.2.3 phases=3 linecode=4c_70 seasons=1 ratings=[400] normamps=400 emergamps=600 length=16.646841 units=m
new object=line.line15 bus1=15.1.2.3 bus2=103.1.2.3 phases=3 linecode=2c_007 seasons=1 ratings=[400] normamps=400 emergamps=600 length=2.7734940000000003 units=m
new object=line.line16 bus1=15.1.2.3 bus2=25.1.2.3 phases=3 linecode=4c_70 seasons=1 ratings=[400] normamps=400 emergamps=600 length=5.2165 units=m
new object=line.line26 bus1=25.1.2.3 bus2=27.1.2.3 phases=3 linecode=2c_16 seasons=1 ratings=[400] normamps=400 emergamps=600 length=5.9049 units=m
new object=line.line29 bus1=27.1.2.3 bus2=34.1.2.3 phases=3 linecode=2c_16 seasons=1 ratings=[400] normamps=400 emergamps=600 length=5.3513 units=m
new object=line.line30 bus1=27.1.2.3 bus2=70.1.2.3 phases=3 linecode=2c_16 seasons=1 ratings=[400] normamps=400 emergamps=600 length=6.7471429999999994 units=m
new object=line.line27 bus1=25.1.2.3 bus2=32.1.2.3 phases=3 linecode=4c_70 seasons=1 ratings=[400] normamps=400 emergamps=600 length=12.6224 units=m
new object=line.line35 bus1=32.1.2.3 bus2=36.1.2.3 phases=3 linecode=2c_16 seasons=1 ratings=[400] normamps=400 emergamps=600 length=5.7265 units=m
new object=line.line39 bus1=36.1.2.3 bus2=83.1.2.3 phases=3 linecode=2c_16 seasons=1 ratings=[400] normamps=400 emergamps=600 length=6.444089999999999 units=m
new object=line.line40 bus1=36.1.2.3 bus2=47.1.2.3 phases=3 linecode=2c_16 seasons=1 ratings=[400] normamps=400 emergamps=600 length=6.1526000000000005 units=m
new object=line.line36 bus1=32.1.2.3 bus2=37.1.2.3 phases=3 linecode=4c_70 seasons=1 ratings=[400] normamps=400 emergamps=600 length=8.0244 units=m
new object=line.line41 bus1=37.1.2.3 bus2=48.1.2.3 phases=3 linecode=4c_70 seasons=1 ratings=[400] normamps=400 emergamps=600 length=9.7762 units=m
new object=line.line52 bus1=48.1.2.3 bus2=59.1.2.3 phases=3 linecode=4c_70 seasons=1 ratings=[400] normamps=400 emergamps=600 length=3.35478 units=m
new object=line.line64 bus1=59.1.2.3 bus2=101.1.2.3 phases=3 linecode=4c_70 seasons=1 ratings=[400] normamps=400 emergamps=600 length=13.37622 units=m
new object=line.line103 bus1=101.1.2.3 bus2=155.1.2.3 phases=3 linecode=4c_35 seasons=1 ratings=[400] normamps=400 emergamps=600 length=14.675170000000001 units=m
new object=line.line161 bus1=155.1.2.3 bus2=178.1.2.3 phases=3 linecode=2c_16 seasons=1 ratings=[400] normamps=400 emergamps=600 length=18.537300000000002 units=m
new object=line.line162 bus1=155.1.2.3 bus2=171.1.2.3 phases=3 linecode=4c_35 seasons=1 ratings=[400] normamps=400 emergamps=600 length=12.3 units=m
new object=line.line178 bus1=171.1.2.3 bus2=196.1.2.3 phases=3 linecode=4c_35 seasons=1 ratings=[400] normamps=400 emergamps=600 length=14.136099999999999 units=m
new object=line.line205 bus1=196.1.2.3 bus2=225.1.2.3 phases=3 linecode=2c_16 seasons=1 ratings=[400] normamps=400 emergamps=600 length=18.459200000000003 units=m
new object=line.line206 bus1=196.1.2.3 bus2=226.1.2.3 phases=3 linecode=4c_35 seasons=1 ratings=[400] normamps=400 emergamps=600 length=7.3714 units=m
new object=line.line232 bus1=226.1.2.3 bus2=241.1.2.3 phases=3 linecode=2c_16 seasons=1 ratings=[400] normamps=400 emergamps=600 length=13.6223 units=m
new object=line.line247 bus1=241.1.2.3 bus2=248.1.2.3 phases=3 linecode=2c_16 seasons=1 ratings=[400] normamps=400 emergamps=600 length=5.3022 units=m
new object=line.line248 bus1=241.1.2.3 bus2=249.1.2.3 phases=3 linecode=2c_16 seasons=1 ratings=[400] normamps=400 emergamps=600 length=5.3022 units=m
new object=line.line233 bus1=226.1.2.3 bus2=234.1.2.3 phases=3 linecode=4c_35 seasons=1 ratings=[400] normamps=400 emergamps=600 length=1.1273 units=m
new object=line.line179 bus1=171.1.2.3 bus2=188.1.2.3 phases=3 linecode=2c_16 seasons=1 ratings=[400] normamps=400 emergamps=600 length=12.4482 units=m
new object=line.line196 bus1=188.1.2.3 bus2=208.1.2.3 phases=3 linecode=2c_16 seasons=1 ratings=[400] normamps=400 emergamps=600 length=6.913600000000001 units=m
new object=line.line197 bus1=188.1.2.3 bus2=264.1.2.3 phases=3 linecode=2c_16 seasons=1 ratings=[400] normamps=400 emergamps=600 length=8.2381 units=m
new object=line.line104 bus1=101.1.2.3 bus2=114.1.2.3 phases=3 linecode=4c_70 seasons=1 ratings=[400] normamps=400 emergamps=600 length=8.79792 units=m
new object=line.line116 bus1=114.1.2.3 bus2=117.1.2.3 phases=3 linecode=4c_35 seasons=1 ratings=[400] normamps=400 emergamps=600 length=1.1056 units=m
new object=line.line120 bus1=117.1.2.3 bus2=219.1.2.3 phases=3 linecode=2c_007 seasons=1 ratings=[400] normamps=400 emergamps=600 length=3.3197900000000002 units=m
new object=line.line121 bus1=117.1.2.3 bus2=127.1.2.3 phases=3 linecode=4c_35 seasons=1 ratings=[400] normamps=400 emergamps=600 length=3.06711 units=m
new object=line.line131 bus1=127.1.2.3 bus2=289.1.2.3 phases=3 linecode=2c_16 seasons=1 ratings=[400] normamps=400 emergamps=600 length=14.34716 units=m
new object=line.line132 bus1=127.1.2.3 bus2=145.1.2.3 phases=3 linecode=4c_35 seasons=1 ratings=[400] normamps=400 emergamps=600 length=16.0946 units=m
new object=line.line150 bus1=145.1.2.3 bus2=166.1.2.3 phases=3 linecode=4c_35 seasons=1 ratings=[400] normamps=400 emergamps=600 length=16.3325 units=m
new object=line.line173 bus1=166.1.2.3 bus2=183.1.2.3 phases=3 linecode=4c_35 seasons=1 ratings=[400] normamps=400 emergamps=600 length=4.50593 units=m
new object=line.line190 bus1=183.1.2.3 bus2=201.1.2.3 phases=3 linecode=4c_35 seasons=1 ratings=[400] normamps=400 emergamps=600 length=3.2465 units=m
new object=line.line191 bus1=183.1.2.3 bus2=290.1.2.3 phases=3 linecode=4c_35 seasons=1 ratings=[400] normamps=400 emergamps=600 length=3.47196 units=m
new object=line.line174 bus1=166.1.2.3 bus2=283.1.2.3 phases=3 linecode=2c_16 seasons=1 ratings=[400] normamps=400 emergamps=600 length=10.40682 units=m
new object=line.line290 bus1=283.1.2.3 bus2=320.1.2.3 phases=3 linecode=2c_16 seasons=1 ratings=[400] normamps=400 emergamps=600 length=7.1168499999999995 units=m
new object=line.line291 bus1=283.1.2.3 bus2=327.1.2.3 phases=3 linecode=2c_16 seasons=1 ratings=[400] normamps=400 emergamps=600 length=3.3248010000000003 units=m
new object=line.line151 bus1=145.1.2.3 bus2=261.1.2.3 phases=3 linecode=2c_16 seasons=1 ratings=[400] normamps=400 emergamps=600 length=11.185210000000001 units=m
new object=line.line267 bus1=261.1.2.3 bus2=276.1.2.3 phases=3 linecode=2c_16 seasons=1 ratings=[400] normamps=400 emergamps=600 length=6.884600000000001 units=m
new object=line.line268 bus1=261.1.2.3 bus2=314.1.2.3 phases=3 linecode=2c_16 seasons=1 ratings=[400] normamps=400 emergamps=600 length=4.80218 units=m
new object=line.line117 bus1=114.1.2.3 bus2=247.1.2.3 phases=3 linecode=4c_1 seasons=1 ratings=[400] normamps=400 emergamps=600 length=28.186839999999997 units=m
new object=line.line254 bus1=247.1.2.3 bus2=387.1.2.3 phases=3 linecode=2c_16 seasons=1 ratings=[400] normamps=400 emergamps=600 length=14.523658 units=m
new object=line.line255 bus1=247.1.2.3 bus2=263.1.2.3 phases=3 linecode=4c_1 seasons=1 ratings=[400] normamps=400 emergamps=600 length=4.06958 units=m
new object=line.line270 bus1=263.1.2.3 bus2=342.1.2.3 phases=3 linecode=2c_16 seasons=1 ratings=[400] normamps=400 emergamps=600 length=14.96775 units=m
new object=line.line271 bus1=263.1.2.3 bus2=280.1.2.3 phases=3 linecode=4c_1 seasons=1 ratings=[400] normamps=400 emergamps=600 length=4.9913 units=m
new object=line.line286 bus1=280.1.2.3 bus2=310.1.2.3 phases=3 linecode=4c_06 seasons=1 ratings=[400] normamps=400 emergamps=600 length=8.23019 units=m
new object=line.line316 bus1=310.1.2.3 bus2=336.1.2.3 phases=3 linecode=2c_16 seasons=1 ratings=[400] normamps=400 emergamps=600 length=7.69863 units=m
new object=line.line342 bus1=336.1.2.3 bus2=349.1.2.3 phases=3 linecode=2c_16 seasons=1 ratings=[400] normamps=400 emergamps=600 length=5.1973 units=m
new object=line.line343 bus1=336.1.2.3 bus2=388.1.2.3 phases=3 linecode=2c_16 seasons=1 ratings=[400] normamps=400 emergamps=600 length=8.52385 units=m
new object=line.line317 bus1=310.1.2.3 bus2=325.1.2.3 phases=3 linecode=4c_06 seasons=1 ratings=[400] normamps=400 emergamps=600 length=10.679400000000001 units=m
new object=line.line330 bus1=325.1.2.3 bus2=337.1.2.3 phases=3 linecode=2c_16 seasons=1 ratings=[400] normamps=400 emergamps=600 length=12.7504 units=m
new object=line.line331 bus1=325.1.2.3 bus2=332.1.2.3 phases=3 linecode=4c_06 seasons=1 ratings=[400] normamps=400 emergamps=600 length=6.6729 units=m
new object=line.line337 bus1=332.1.2.3 bus2=406.1.2.3 phases=3 linecode=2c_16 seasons=1 ratings=[400] normamps=400 emergamps=600 length=15.785301999999998 units=m
new object=line.line338 bus1=332.1.2.3 bus2=419.1.2.3 phases=3 linecode=4c_06 seasons=1 ratings=[400] normamps=400 emergamps=600 length=13.80349 units=m
new object=line.line424 bus1=419.1.2.3 bus2=425.1.2.3 phases=3 linecode=4c_06 seasons=1 ratings=[400] normamps=400 emergamps=600 length=1.7537 units=m
new object=line.line431 bus1=425.1.2.3 bus2=432.1.2.3 phases=3 linecode=4c_06 seasons=1 ratings=[400] normamps=400 emergamps=600 length=5.9151 units=m
new object=line.line438 bus1=432.1.2.3 bus2=439.1.2.3 phases=3 linecode=4c_06 seasons=1 ratings=[400] normamps=400 emergamps=600 length=8.3663 units=m
new object=line.line445 bus1=439.1.2.3 bus2=446.1.2.3 phases=3 linecode=4c_06 seasons=1 ratings=[400] normamps=400 emergamps=600 length=6.0033 units=m
new object=line.line452 bus1=446.1.2.3 bus2=453.1.2.3 phases=3 linecode=4c_06 seasons=1 ratings=[400] normamps=400 emergamps=600 length=1.8214 units=m
new object=line.line459 bus1=453.1.2.3 bus2=460.1.2.3 phases=3 linecode=4c_06 seasons=1 ratings=[400] normamps=400 emergamps=600 length=5.3905 units=m
new object=line.line466 bus1=460.1.2.3 bus2=467.1.2.3 phases=3 linecode=4c_06 seasons=1 ratings=[400] normamps=400 emergamps=600 length=5.9891 units=m
new object=line.line474 bus1=467.1.2.3 bus2=475.1.2.3 phases=3 linecode=4c_06 seasons=1 ratings=[400] normamps=400 emergamps=600 length=2.1947 units=m
new object=line.line481 bus1=475.1.2.3 bus2=482.1.2.3 phases=3 linecode=4c_06 seasons=1 ratings=[400] normamps=400 emergamps=600 length=4.6432 units=m
new object=line.line489 bus1=482.1.2.3 bus2=490.1.2.3 phases=3 linecode=4c_06 seasons=1 ratings=[400] normamps=400 emergamps=600 length=6.6548 units=m
new object=line.line498 bus1=490.1.2.3 bus2=499.1.2.3 phases=3 linecode=4c_06 seasons=1 ratings=[400] normamps=400 emergamps=600 length=4.0612 units=m
new object=line.line507 bus1=499.1.2.3 bus2=508.1.2.3 phases=3 linecode=4c_06 seasons=1 ratings=[400] normamps=400 emergamps=600 length=0.69938 units=m
new object=line.line515 bus1=508.1.2.3 bus2=516.1.2.3 phases=3 linecode=4c_06 seasons=1 ratings=[400] normamps=400 emergamps=600 length=1.8857 units=m
new object=line.line524 bus1=516.1.2.3 bus2=525.1.2.3 phases=3 linecode=4c_06 seasons=1 ratings=[400] normamps=400 emergamps=600 length=1.3881 units=m
new object=line.line532 bus1=525.1.2.3 bus2=533.1.2.3 phases=3 linecode=4c_06 seasons=1 ratings=[400] normamps=400 emergamps=600 length=1.8899 units=m
new object=line.line541 bus1=533.1.2.3 bus2=542.1.2.3 phases=3 linecode=4c_06 seasons=1 ratings=[400] normamps=400 emergamps=600 length=1.3374 units=m
new object=line.line549 bus1=542.1.2.3 bus2=550.1.2.3 phases=3 linecode=4c_06 seasons=1 ratings=[400] normamps=400 emergamps=600 length=3.7401 units=m
new object=line.line558 bus1=550.1.2.3 bus2=559.1.2.3 phases=3 linecode=4c_06 seasons=1 ratings=[400] normamps=400 emergamps=600 length=2.7082 units=m
new object=line.line566 bus1=559.1.2.3 bus2=567.1.2.3 phases=3 linecode=4c_06 seasons=1 ratings=[400] normamps=400 emergamps=600 length=0.60068 units=m
new object=line.line572 bus1=567.1.2.3 bus2=573.1.2.3 phases=3 linecode=4c_06 seasons=1 ratings=[400] normamps=400 emergamps=600 length=0.14223 units=m
new object=line.line578 bus1=573.1.2.3 bus2=579.1.2.3 phases=3 linecode=4c_06 seasons=1 ratings=[400] normamps=400 emergamps=600 length=3.8558 units=m
new object=line.line586 bus1=579.1.2.3 bus2=587.1.2.3 phases=3 linecode=4c_06 seasons=1 ratings=[400] normamps=400 emergamps=600 length=2.7022 units=m
new object=line.line594 bus1=587.1.2.3 bus2=595.1.2.3 phases=3 linecode=4c_06 seasons=1 ratings=[400] normamps=400 emergamps=600 length=5.4142 units=m
new object=line.line603 bus1=595.1.2.3 bus2=604.1.2.3 phases=3 linecode=4c_06 seasons=1 ratings=[400] normamps=400 emergamps=600 length=4.8283 units=m
new object=line.line615 bus1=604.1.2.3 bus2=639.1.2.3 phases=3 linecode=2c_0225 seasons=1 ratings=[400] normamps=400 emergamps=600 length=16.051499999999997 units=m
new object=line.line616 bus1=604.1.2.3 bus2=617.1.2.3 phases=3 linecode=4c_06 seasons=1 ratings=[400] normamps=400 emergamps=600 length=3.1088 units=m
new object=line.line617 bus1=604.1.2.3 bus2=618.1.2.3 phases=3 linecode=4c_06 seasons=1 ratings=[400] normamps=400 emergamps=600 length=3.1088 units=m
new object=line.line604 bus1=595.1.2.3 bus2=605.1.2.3 phases=3 linecode=4c_06 seasons=1 ratings=[400] normamps=400 emergamps=600 length=4.8283 units=m
new object=line.line605 bus1=595.1.2.3 bus2=606.1.2.3 phases=3 linecode=4c_06 seasons=1 ratings=[400] normamps=400 emergamps=600 length=4.7719 units=m
new object=line.line595 bus1=587.1.2.3 bus2=596.1.2.3 phases=3 linecode=4c_06 seasons=1 ratings=[400] normamps=400 emergamps=600 length=0.64238 units=m
new object=line.line606 bus1=596.1.2.3 bus2=619.1.2.3 phases=3 linecode=2c_16 seasons=1 ratings=[400] normamps=400 emergamps=600 length=14.4096 units=m
new object=line.line607 bus1=596.1.2.3 bus2=608.1.2.3 phases=3 linecode=2c_16 seasons=1 ratings=[400] normamps=400 emergamps=600 length=11.6642 units=m
new object=line.line587 bus1=579.1.2.3 bus2=588.1.2.3 phases=3 linecode=4c_06 seasons=1 ratings=[400] normamps=400 emergamps=600 length=2.7022 units=m
new object=line.line579 bus1=573.1.2.3 bus2=580.1.2.3 phases=3 linecode=4c_06 seasons=1 ratings=[400] normamps=400 emergamps=600 length=3.8558 units=m
new object=line.line580 bus1=573.1.2.3 bus2=681.1.2.3 phases=3 linecode=4c_06 seasons=1 ratings=[400] normamps=400 emergamps=600 length=2.427401 units=m
new object=line.line573 bus1=567.1.2.3 bus2=574.1.2.3 phases=3 linecode=4c_06 seasons=1 ratings=[400] normamps=400 emergamps=600 length=0.14223 units=m
new object=line.line567 bus1=559.1.2.3 bus2=568.1.2.3 phases=3 linecode=4c_06 seasons=1 ratings=[400] normamps=400 emergamps=600 length=0.60068 units=m
new object=line.line568 bus1=559.1.2.3 bus2=651.1.2.3 phases=3 linecode=2c_16 seasons=1 ratings=[400] normamps=400 emergamps=600 length=13.713470000000001 units=m
new object=line.line655 bus1=651.1.2.3 bus2=682.1.2.3 phases=3 linecode=2c_16 seasons=1 ratings=[400] normamps=400 emergamps=600 length=6.02494 units=m
new object=line.line656 bus1=651.1.2.3 bus2=676.1.2.3 phases=3 linecode=2c_16 seasons=1 ratings=[400] normamps=400 emergamps=600 length=5.34659 units=m
new object=line.line559 bus1=550.1.2.3 bus2=560.1.2.3 phases=3 linecode=4c_06 seasons=1 ratings=[400] normamps=400 emergamps=600 length=2.7082 units=m
new object=line.line550 bus1=542.1.2.3 bus2=551.1.2.3 phases=3 linecode=4c_06 seasons=1 ratings=[400] normamps=400 emergamps=600 length=3.7401 units=m
new object=line.line542 bus1=533.1.2.3 bus2=543.1.2.3 phases=3 linecode=4c_06 seasons=1 ratings=[400] normamps=400 emergamps=600 length=1.3374 units=m
new object=line.line533 bus1=525.1.2.3 bus2=534.1.2.3 phases=3 linecode=4c_06 seasons=1 ratings=[400] normamps=400 emergamps=600 length=1.8899 units=m
new object=line.line525 bus1=516.1.2.3 bus2=526.1.2.3 phases=3 linecode=4c_06 seasons=1 ratings=[400] normamps=400 emergamps=600 length=1.3881 units=m
new object=line.line516 bus1=508.1.2.3 bus2=517.1.2.3 phases=3 linecode=4c_06 seasons=1 ratings=[400] normamps=400 emergamps=600 length=1.8857 units=m
new object=line.line517 bus1=508.1.2.3 bus2=544.1.2.3 phases=3 linecode=2c_16 seasons=1 ratings=[400] normamps=400 emergamps=600 length=10.65842 units=m
new object=line.line551 bus1=544.1.2.3 bus2=611.1.2.3 phases=3 linecode=2c_16 seasons=1 ratings=[400] normamps=400 emergamps=600 length=6.37701 units=m
new object=line.line552 bus1=544.1.2.3 bus2=562.1.2.3 phases=3 linecode=2c_16 seasons=1 ratings=[400] normamps=400 emergamps=600 length=6.6554 units=m
new object=line.line508 bus1=499.1.2.3 bus2=509.1.2.3 phases=3 linecode=4c_06 seasons=1 ratings=[400] normamps=400 emergamps=600 length=0.69938 units=m
new object=line.line499 bus1=490.1.2.3 bus2=500.1.2.3 phases=3 linecode=4c_06 seasons=1 ratings=[400] normamps=400 emergamps=600 length=4.0612 units=m
new object=line.line490 bus1=482.1.2.3 bus2=491.1.2.3 phases=3 linecode=4c_06 seasons=1 ratings=[400] normamps=400 emergamps=600 length=6.6548 units=m
new object=line.line482 bus1=475.1.2.3 bus2=483.1.2.3 phases=3 linecode=4c_06 seasons=1 ratings=[400] normamps=400 emergamps=600 length=4.6432 units=m
new object=line.line483 bus1=475.1.2.3 bus2=484.1.2.3 phases=3 linecode=2c_16 seasons=1 ratings=[400] normamps=400 emergamps=600 length=10.2769 units=m
new object=line.line491 bus1=484.1.2.3 bus2=563.1.2.3 phases=3 linecode=2c_16 seasons=1 ratings=[400] normamps=400 emergamps=600 length=5.54817 units=m
new object=line.line492 bus1=484.1.2.3 bus2=502.1.2.3 phases=3 linecode=2c_16 seasons=1 ratings=[400] normamps=400 emergamps=600 length=6.6786 units=m
new object=line.line475 bus1=467.1.2.3 bus2=476.1.2.3 phases=3 linecode=4c_06 seasons=1 ratings=[400] normamps=400 emergamps=600 length=2.1947 units=m
new object=line.line467 bus1=460.1.2.3 bus2=468.1.2.3 phases=3 linecode=4c_06 seasons=1 ratings=[400] normamps=400 emergamps=600 length=5.9891 units=m
new object=line.line468 bus1=460.1.2.3 bus2=469.1.2.3 phases=3 linecode=4c_06 seasons=1 ratings=[400] normamps=400 emergamps=600 length=0.88292 units=m
new object=line.line460 bus1=453.1.2.3 bus2=461.1.2.3 phases=3 linecode=4c_06 seasons=1 ratings=[400] normamps=400 emergamps=600 length=5.3905 units=m
new object=line.line461 bus1=453.1.2.3 bus2=629.1.2.3 phases=3 linecode=2c_16 seasons=1 ratings=[400] normamps=400 emergamps=600 length=16.52655 units=m
new object=line.line453 bus1=446.1.2.3 bus2=454.1.2.3 phases=3 linecode=4c_06 seasons=1 ratings=[400] normamps=400 emergamps=600 length=1.8214 units=m
new object=line.line446 bus1=439.1.2.3 bus2=447.1.2.3 phases=3 linecode=4c_06 seasons=1 ratings=[400] normamps=400 emergamps=600 length=6.0033 units=m
new object=line.line439 bus1=432.1.2.3 bus2=440.1.2.3 phases=3 linecode=4c_06 seasons=1 ratings=[400] normamps=400 emergamps=600 length=8.3663 units=m
new object=line.line432 bus1=425.1.2.3 bus2=433.1.2.3 phases=3 linecode=4c_06 seasons=1 ratings=[400] normamps=400 emergamps=600 length=5.9151 units=m
new object=line.line425 bus1=419.1.2.3 bus2=426.1.2.3 phases=3 linecode=4c_06 seasons=1 ratings=[400] normamps=400 emergamps=600 length=1.7537 units=m
new object=line.line287 bus1=280.1.2.3 bus2=373.1.2.3 phases=3 linecode=4c_1 seasons=1 ratings=[400] normamps=400 emergamps=600 length=7.301714 units=m
new object=line.line377 bus1=373.1.2.3 bus2=391.1.2.3 phases=3 linecode=4c_1 seasons=1 ratings=[400] normamps=400 emergamps=600 length=7.371110000000001 units=m
new object=line.line395 bus1=391.1.2.3 bus2=530.1.2.3 phases=3 linecode=2c_16 seasons=1 ratings=[400] normamps=400 emergamps=600 length=10.680624 units=m
new object=line.line537 bus1=530.1.2.3 bus2=556.1.2.3 phases=3 linecode=2c_16 seasons=1 ratings=[400] normamps=400 emergamps=600 length=9.8006 units=m
new object=line.line538 bus1=530.1.2.3 bus2=539.1.2.3 phases=3 linecode=2c_16 seasons=1 ratings=[400] normamps=400 emergamps=600 length=5.5837 units=m
new object=line.line396 bus1=391.1.2.3 bus2=403.1.2.3 phases=3 linecode=4c_1 seasons=1 ratings=[400] normamps=400 emergamps=600 length=4.2684 units=m
new object=line.line408 bus1=403.1.2.3 bus2=505.1.2.3 phases=3 linecode=4c_1 seasons=1 ratings=[400] normamps=400 emergamps=600 length=22.040599999999998 units=m
new object=line.line512 bus1=505.1.2.3 bus2=522.1.2.3 phases=3 linecode=2c_16 seasons=1 ratings=[400] normamps=400 emergamps=600 length=10.4722 units=m
new object=line.line513 bus1=505.1.2.3 bus2=578.1.2.3 phases=3 linecode=4c_1 seasons=1 ratings=[400] normamps=400 emergamps=600 length=2.936771 units=m
new object=line.line584 bus1=578.1.2.3 bus2=785.1.2.3 phases=3 linecode=2c_16 seasons=1 ratings=[400] normamps=400 emergamps=600 length=15.715408 units=m
new object=line.line585 bus1=578.1.2.3 bus2=594.1.2.3 phases=3 linecode=4c_1 seasons=1 ratings=[400] normamps=400 emergamps=600 length=4.77453 units=m
new object=line.line601 bus1=594.1.2.3 bus2=614.1.2.3 phases=3 linecode=2c_16 seasons=1 ratings=[400] normamps=400 emergamps=600 length=14.0043 units=m
new object=line.line602 bus1=594.1.2.3 bus2=615.1.2.3 phases=3 linecode=4c_1 seasons=1 ratings=[400] normamps=400 emergamps=600 length=9.089 units=m
new object=line.line623 bus1=615.1.2.3 bus2=688.1.2.3 phases=3 linecode=2c_16 seasons=1 ratings=[400] normamps=400 emergamps=600 length=13.76873 units=m
new object=line.line624 bus1=615.1.2.3 bus2=666.1.2.3 phases=3 linecode=4c_1 seasons=1 ratings=[400] normamps=400 emergamps=600 length=2.70115 units=m
new object=line.line671 bus1=666.1.2.3 bus2=786.1.2.3 phases=3 linecode=2c_16 seasons=1 ratings=[400] normamps=400 emergamps=600 length=15.18983 units=m
new object=line.line791 bus1=786.1.2.3 bus2=854.1.2.3 phases=3 linecode=2c_16 seasons=1 ratings=[400] normamps=400 emergamps=600 length=2.2918200000000004 units=m
new object=line.line859 bus1=854.1.2.3 bus2=860.1.2.3 phases=3 linecode=2c_16 seasons=1 ratings=[400] normamps=400 emergamps=600 length=2.82 units=m
new object=line.line860 bus1=854.1.2.3 bus2=861.1.2.3 phases=3 linecode=2c_16 seasons=1 ratings=[400] normamps=400 emergamps=600 length=7.5091 units=m
new object=line.line792 bus1=786.1.2.3 bus2=817.1.2.3 phases=3 linecode=2c_16 seasons=1 ratings=[400] normamps=400 emergamps=600 length=9.7761 units=m
new object=line.line672 bus1=666.1.2.3 bus2=686.1.2.3 phases=3 linecode=4c_1 seasons=1 ratings=[400] normamps=400 emergamps=600 length=9.62961 units=m
new object=line.line689 bus1=686.1.2.3 bus2=690.1.2.3 phases=3 linecode=2c_16 seasons=1 ratings=[400] normamps=400 emergamps=600 length=8.1445 units=m
new object=line.line693 bus1=690.1.2.3 bus2=778.1.2.3 phases=3 linecode=2c_16 seasons=1 ratings=[400] normamps=400 emergamps=600 length=7.3578600000000005 units=m
new object=line.line694 bus1=690.1.2.3 bus2=701.1.2.3 phases=3 linecode=2c_16 seasons=1 ratings=[400] normamps=400 emergamps=600 length=6.4573 units=m
new object=line.line690 bus1=686.1.2.3 bus2=691.1.2.3 phases=3 linecode=4c_1 seasons=1 ratings=[400] normamps=400 emergamps=600 length=10.5254 units=m
new object=line.line695 bus1=691.1.2.3 bus2=702.1.2.3 phases=3 linecode=2c_16 seasons=1 ratings=[400] normamps=400 emergamps=600 length=14.9747 units=m
new object=line.line696 bus1=691.1.2.3 bus2=703.1.2.3 phases=3 linecode=4c_1 seasons=1 ratings=[400] normamps=400 emergamps=600 length=4.5907 units=m
new object=line.line706 bus1=703.1.2.3 bus2=707.1.2.3 phases=3 linecode=4c_06 seasons=1 ratings=[400] normamps=400 emergamps=600 length=6.3308 units=m
new object=line.line711 bus1=707.1.2.3 bus2=718.1.2.3 phases=3 linecode=4c_06 seasons=1 ratings=[400] normamps=400 emergamps=600 length=15.2459 units=m
new object=line.line723 bus1=718.1.2.3 bus2=745.1.2.3 phases=3 linecode=4c_06 seasons=1 ratings=[400] normamps=400 emergamps=600 length=17.0068 units=m
new object=line.line752 bus1=745.1.2.3 bus2=794.1.2.3 phases=3 linecode=4c_06 seasons=1 ratings=[400] normamps=400 emergamps=600 length=19.4603 units=m
new object=line.line800 bus1=794.1.2.3 bus2=884.1.2.3 phases=3 linecode=2c_16 seasons=1 ratings=[400] normamps=400 emergamps=600 length=10.77222 units=m
new object=line.line887 bus1=884.1.2.3 bus2=906.1.2.3 phases=3 linecode=2c_16 seasons=1 ratings=[400] normamps=400 emergamps=600 length=8.09168 units=m
new object=line.line888 bus1=884.1.2.3 bus2=898.1.2.3 phases=3 linecode=35_sac_xsc seasons=1 ratings=[400] normamps=400 emergamps=600 length=10.336300000000001 units=m
new object=line.line801 bus1=794.1.2.3 bus2=802.1.2.3 phases=3 linecode=4c_95_sac_xc seasons=1 ratings=[400] normamps=400 emergamps=600 length=2.8031 units=m
new object=line.line809 bus1=802.1.2.3 bus2=810.1.2.3 phases=3 linecode=4c_06 seasons=1 ratings=[400] normamps=400 emergamps=600 length=3.0749 units=m
new object=line.line818 bus1=810.1.2.3 bus2=819.1.2.3 phases=3 linecode=4c_06 seasons=1 ratings=[400] normamps=400 emergamps=600 length=2.5782 units=m
new object=line.line825 bus1=819.1.2.3 bus2=826.1.2.3 phases=3 linecode=4c_06 seasons=1 ratings=[400] normamps=400 emergamps=600 length=2.7715 units=m
new object=line.line832 bus1=826.1.2.3 bus2=833.1.2.3 phases=3 linecode=4c_06 seasons=1 ratings=[400] normamps=400 emergamps=600 length=2.2755 units=m
new object=line.line838 bus1=833.1.2.3 bus2=839.1.2.3 phases=3 linecode=4c_06 seasons=1 ratings=[400] normamps=400 emergamps=600 length=2.443 units=m
new object=line.line843 bus1=839.1.2.3 bus2=868.1.2.3 phases=3 linecode=2c_0225 seasons=1 ratings=[400] normamps=400 emergamps=600 length=10.12454 units=m
new object=line.line872 bus1=868.1.2.3 bus2=899.1.2.3 phases=3 linecode=2c_0225 seasons=1 ratings=[400] normamps=400 emergamps=600 length=9.33893 units=m
new object=line.line873 bus1=868.1.2.3 bus2=886.1.2.3 phases=3 linecode=2c_0225 seasons=1 ratings=[400] normamps=400 emergamps=600 length=7.50839 units=m
new object=line.line844 bus1=839.1.2.3 bus2=845.1.2.3 phases=3 linecode=4c_06 seasons=1 ratings=[400] normamps=400 emergamps=600 length=3.6212 units=m
new object=line.line850 bus1=845.1.2.3 bus2=851.1.2.3 phases=3 linecode=4c_06 seasons=1 ratings=[400] normamps=400 emergamps=600 length=4.364 units=m
new object=line.line856 bus1=851.1.2.3 bus2=857.1.2.3 phases=3 linecode=4c_06 seasons=1 ratings=[400] normamps=400 emergamps=600 length=6.8621 units=m
new object=line.line863 bus1=857.1.2.3 bus2=864.1.2.3 phases=3 linecode=4c_06 seasons=1 ratings=[400] normamps=400 emergamps=600 length=2.7888 units=m
new object=line.line868 bus1=864.1.2.3 bus2=869.1.2.3 phases=3 linecode=4c_06 seasons=1 ratings=[400] normamps=400 emergamps=600 length=1.7373 units=m
new object=line.line874 bus1=869.1.2.3 bus2=875.1.2.3 phases=3 linecode=4c_06 seasons=1 ratings=[400] normamps=400 emergamps=600 length=1.2 units=m
new object=line.line880 bus1=875.1.2.3 bus2=881.1.2.3 phases=3 linecode=4c_06 seasons=1 ratings=[400] normamps=400 emergamps=600 length=1.0112 units=m
new object=line.line881 bus1=875.1.2.3 bus2=882.1.2.3 phases=3 linecode=4c_06 seasons=1 ratings=[400] normamps=400 emergamps=600 length=1.0112 units=m
new object=line.line875 bus1=869.1.2.3 bus2=876.1.2.3 phases=3 linecode=4c_06 seasons=1 ratings=[400] normamps=400 emergamps=600 length=1.2 units=m
new object=line.line869 bus1=864.1.2.3 bus2=870.1.2.3 phases=3 linecode=4c_06 seasons=1 ratings=[400] normamps=400 emergamps=600 length=1.7373 units=m
new object=line.line864 bus1=857.1.2.3 bus2=865.1.2.3 phases=3 linecode=4c_06 seasons=1 ratings=[400] normamps=400 emergamps=600 length=2.7888 units=m
new object=line.line857 bus1=851.1.2.3 bus2=858.1.2.3 phases=3 linecode=4c_06 seasons=1 ratings=[400] normamps=400 emergamps=600 length=6.8621 units=m
new object=line.line851 bus1=845.1.2.3 bus2=852.1.2.3 phases=3 linecode=4c_06 seasons=1 ratings=[400] normamps=400 emergamps=600 length=4.364 units=m
new object=line.line845 bus1=839.1.2.3 bus2=846.1.2.3 phases=3 linecode=4c_06 seasons=1 ratings=[400] normamps=400 emergamps=600 length=3.6212 units=m
new object=line.line839 bus1=833.1.2.3 bus2=840.1.2.3 phases=3 linecode=4c_06 seasons=1 ratings=[400] normamps=400 emergamps=600 length=2.443 units=m
new object=line.line833 bus1=826.1.2.3 bus2=834.1.2.3 phases=3 linecode=4c_06 seasons=1 ratings=[400] normamps=400 emergamps=600 length=2.2755 units=m
new object=line.line826 bus1=819.1.2.3 bus2=827.1.2.3 phases=3 linecode=4c_06 seasons=1 ratings=[400] normamps=400 emergamps=600 length=2.7715 units=m
new object=line.line819 bus1=810.1.2.3 bus2=820.1.2.3 phases=3 linecode=4c_06 seasons=1 ratings=[400] normamps=400 emergamps=600 length=2.5782 units=m
new object=line.line810 bus1=802.1.2.3 bus2=811.1.2.3 phases=3 linecode=4c_06 seasons=1 ratings=[400] normamps=400 emergamps=600 length=3.0749 units=m
new object=line.line753 bus1=745.1.2.3 bus2=763.1.2.3 phases=3 linecode=2c_16 seasons=1 ratings=[400] normamps=400 emergamps=600 length=10.8733 units=m
new object=line.line770 bus1=763.1.2.3 bus2=780.1.2.3 phases=3 linecode=2c_16 seasons=1 ratings=[400] normamps=400 emergamps=600 length=7.129 units=m
new object=line.line771 bus1=763.1.2.3 bus2=835.1.2.3 phases=3 linecode=2c_16 seasons=1 ratings=[400] normamps=400 emergamps=600 length=5.65812 units=m
new object=line.line724 bus1=718.1.2.3 bus2=739.1.2.3 phases=3 linecode=2c_16 seasons=1 ratings=[400] normamps=400 emergamps=600 length=11.26017 units=m
new object=line.line745 bus1=739.1.2.3 bus2=755.1.2.3 phases=3 linecode=2c_16 seasons=1 ratings=[400] normamps=400 emergamps=600 length=6.7778 units=m
new object=line.line746 bus1=739.1.2.3 bus2=813.1.2.3 phases=3 linecode=2c_16 seasons=1 ratings=[400] normamps=400 emergamps=600 length=5.756152999999999 units=m
new object=line.line712 bus1=707.1.2.3 bus2=891.1.2.3 phases=3 linecode=2c_16 seasons=1 ratings=[400] normamps=400 emergamps=600 length=12.748019 units=m
new object=line.line894 bus1=891.1.2.3 bus2=900.1.2.3 phases=3 linecode=2c_16 seasons=1 ratings=[400] normamps=400 emergamps=600 length=9.6933 units=m
new object=line.line895 bus1=891.1.2.3 bus2=896.1.2.3 phases=3 linecode=2c_16 seasons=1 ratings=[400] normamps=400 emergamps=600 length=3.2587 units=m
new object=line.line707 bus1=703.1.2.3 bus2=830.1.2.3 phases=3 linecode=4c_06 seasons=1 ratings=[400] normamps=400 emergamps=600 length=2.947879 units=m
new object=line.line409 bus1=403.1.2.3 bus2=566.1.2.3 phases=3 linecode=4c_1 seasons=1 ratings=[400] normamps=400 emergamps=600 length=1.953914 units=m
new object=line.line378 bus1=373.1.2.3 bus2=379.1.2.3 phases=3 linecode=2c_16 seasons=1 ratings=[400] normamps=400 emergamps=600 length=1.4115 units=m
new object=line.line384 bus1=379.1.2.3 bus2=458.1.2.3 phases=3 linecode=2c_16 seasons=1 ratings=[400] normamps=400 emergamps=600 length=19.82295 units=m
new object=line.line385 bus1=379.1.2.3 bus2=507.1.2.3 phases=3 linecode=2c_16 seasons=1 ratings=[400] normamps=400 emergamps=600 length=21.942269999999997 units=m
new object=line.line65 bus1=59.1.2.3 bus2=66.1.2.3 phases=3 linecode=2c_16 seasons=1 ratings=[400] normamps=400 emergamps=600 length=8.2583 units=m
new object=line.line72 bus1=66.1.2.3 bus2=73.1.2.3 phases=3 linecode=2c_16 seasons=1 ratings=[400] normamps=400 emergamps=600 length=4.0366 units=m
new object=line.line73 bus1=66.1.2.3 bus2=74.1.2.3 phases=3 linecode=2c_16 seasons=1 ratings=[400] normamps=400 emergamps=600 length=4.0366 units=m
new object=line.line53 bus1=48.1.2.3 bus2=89.1.2.3 phases=3 linecode=4c_70 seasons=1 ratings=[400] normamps=400 emergamps=600 length=1.278008 units=m
new object=line.line42 bus1=37.1.2.3 bus2=169.1.2.3 phases=3 linecode=4c_185 seasons=1 ratings=[400] normamps=400 emergamps=600 length=38.351033 units=m
new object=load.load1 phases=1 bus1=34.1 kv=0.23 kw=1 pf=0.95 yearly=shape_1
new object=load.load3 phases=1 bus1=70.1 kv=0.23 kw=1 pf=0.95 yearly=shape_3
new object=load.load6 phases=1 bus1=83.2 kv=0.23 kw=1 pf=0.95 yearly=shape_6
new object=load.load2 phases=1 bus1=47.2 kv=0.23 kw=1 pf=0.95 yearly=shape_2
new object=load.load7 phases=1 bus1=178.2 kv=0.23 kw=1 pf=0.95 yearly=shape_7
new object=load.load9 phases=1 bus1=225.1 kv=0.23 kw=1 pf=0.95 yearly=shape_9
new object=load.load10 phases=1 bus1=248.2 kv=0.23 kw=1 pf=0.95 yearly=shape_10
new object=load.load11 phases=1 bus1=249.2 kv=0.23 kw=1 pf=0.95 yearly=shape_11
new object=load.load8 phases=1 bus1=208.3 kv=0.23 kw=1 pf=0.95 yearly=shape_8
new object=load.load12 phases=1 bus1=264.3 kv=0.23 kw=1 pf=0.95 yearly=shape_12
new object=load.load14 phases=1 bus1=289.1 kv=0.23 kw=1 pf=0.95 yearly=shape_14
new object=load.load16 phases=1 bus1=320.3 kv=0.23 kw=1 pf=0.95 yearly=shape_16
new object=load.load17 phases=1 bus1=327.3 kv=0.23 kw=1 pf=0.95 yearly=shape_17
new object=load.load13 phases=1 bus1=276.2 kv=0.23 kw=1 pf=0.95 yearly=shape_13
new object=load.load15 phases=1 bus1=314.2 kv=0.23 kw=1 pf=0.95 yearly=shape_15
new object=load.load21 phases=1 bus1=387.1 kv=0.23 kw=1 pf=0.95 yearly=shape_21
new object=load.load19 phases=1 bus1=342.3 kv=0.23 kw=1 pf=0.95 yearly=shape_19
new object=load.load20 phases=1 bus1=349.1 kv=0.23 kw=1 pf=0.95 yearly=shape_20
new object=load.load22 phases=1 bus1=388.1 kv=0.23 kw=1 pf=0.95 yearly=shape_22
new object=load.load18 phases=1 bus1=337.3 kv=0.23 kw=1 pf=0.95 yearly=shape_18
new object=load.load23 phases=1 bus1=406.2 kv=0.23 kw=1 pf=0.95 yearly=shape_23
new object=load.load35 phases=1 bus1=639.2 kv=0.23 kw=1 pf=0.95 yearly=shape_35
new object=load.load33 phases=1 bus1=619.3 kv=0.23 kw=1 pf=0.95 yearly=shape_33
new object=load.load37 phases=1 bus1=682.2 kv=0.23 kw=1 pf=0.95 yearly=shape_37
new object=load.load36 phases=1 bus1=676.2 kv=0.23 kw=1 pf=0.95 yearly=shape_36
new object=load.load31 phases=1 bus1=611.1 kv=0.23 kw=1 pf=0.95 yearly=shape_31
new object=load.load29 phases=1 bus1=562.1 kv=0.23 kw=1 pf=0.95 yearly=shape_29
new object=load.load30 phases=1 bus1=563.1 kv=0.23 kw=1 pf=0.95 yearly=shape_30
new object=load.load25 phases=1 bus1=502.1 kv=0.23 kw=1 pf=0.95 yearly=shape_25
new object=load.load34 phases=1 bus1=629.1 kv=0.23 kw=1 pf=0.95 yearly=shape_34
new object=load.load28 phases=1 bus1=556.3 kv=0.23 kw=1 pf=0.95 yearly=shape_28
new object=load.load27 phases=1 bus1=539.3 kv=0.23 kw=1 pf=0.95 yearly=shape_27
new object=load.load26 phases=1 bus1=522.2 kv=0.23 kw=1 pf=0.95 yearly=shape_26
new object=load.load44 phases=1 bus1=785.2 kv=0.23 kw=1 pf=0.95 yearly=shape_44
new object=load.load32 phases=1 bus1=614.3 kv=0.23 kw=1 pf=0.95 yearly=shape_32
new object=load.load38 phases=1 bus1=688.2 kv=0.23 kw=1 pf=0.95 yearly=shape_38
new object=load.load48 phases=1 bus1=860.1 kv=0.23 kw=1 pf=0.95 yearly=shape_48
new object=load.load49 phases=1 bus1=861.1 kv=0.23 kw=1 pf=0.95 yearly=shape_49
new object=load.load46 phases=1 bus1=817.1 kv=0.23 kw=1 pf=0.95 yearly=shape_46
new object=load.load42 phases=1 bus1=778.3 kv=0.23 kw=1 pf=0.95 yearly=shape_42
new object=load.load39 phases=1 bus1=701.3 kv=0.23 kw=1 pf=0.95 yearly=shape_39
new object=load.load40 phases=1 bus1=702.2 kv=0.23 kw=1 pf=0.95 yearly=shape_40
new object=load.load55 phases=1 bus1=906.1 kv=0.23 kw=1 pf=0.95 yearly=shape_55
new object=load.load52 phases=1 bus1=898.1 kv=0.23 kw=1 pf=0.95 yearly=shape_52
new object=load.load53 phases=1 bus1=899.2 kv=0.23 kw=1 pf=0.95 yearly=shape_53
new object=load.load50 phases=1 bus1=886.2 kv=0.23 kw=1 pf=0.95 yearly=shape_50
new object=load.load43 phases=1 bus1=780.3 kv=0.23 kw=1 pf=0.95 yearly=shape_43
new object=load.load47 phases=1 bus1=835.3 kv=0.23 kw=1 pf=0.95 yearly=shape_47
new object=load.load41 phases=1 bus1=755.2 kv=0.23 kw=1 pf=0.95 yearly=shape_41
new object=load.load45 phases=1 bus1=813.2 kv=0.23 kw=1 pf=0.95 yearly=shape_45
new object=load.load54 phases=1 bus1=900.1 kv=0.23 kw=1 pf=0.95 yearly=shape_54
new object=load.load51 phases=1 bus1=896.1 kv=0.23 kw=1 pf=0.95 yearly=shape_51
new object=load.load24 phases=1 bus1=458.3 kv=0.23 kw=1 pf=0.95 yearly=shape_24
new object=load.load4 phases=1 bus1=73.1 kv=0.23 kw=1 pf=0.95 yearly=shape_4
new object=load.load5 phases=1 bus1=74.1 kv=0.23 kw=1 pf=0.95 yearly=shape_5
new object=transformer.tr1 buses=[sourcebus.1.2.3,1.1.2.3] conns=[delta,wye] kvs=[11,0.416] kvas=[800,800] xhl=4 sub=y
new object=monitor.line558_vi_vs_time element=line.line558 terminal=2 mode=0
new object=monitor.line825_vi_vs_time element=line.line825 terminal=2 mode=0
new object=energymeter.m1 element=line.line1 terminal=1
makebuslist
set voltagebases=[11,0.416]
setbusxy bus=1 x=390872.663 y=392887.379
setbusxy bus=15 x=390872.292 y=392875.208
setbusxy bus=25 x=390877.003 y=392873.341
setbusxy bus=32 x=390886.111 y=392864.602
setbusxy bus=37 x=390891.919 y=392859.065
setbusxy bus=169 x=390871.1 y=392832.049
setbusxy bus=48 x=390899.026 y=392852.352
setbusxy bus=89 x=390900.06 y=392853.057
setbusxy bus=59 x=390901.469 y=392850.053
setbusxy bus=66 x=390907.23 y=392855.97
setbusxy bus=74 x=390907 y=392860
setbusxy bus=73 x=390907 y=392860
setbusxy bus=101 x=390911.997 y=392841.898
setbusxy bus=114 x=390918.004 y=392835.491
setbusxy bus=247 x=390907.213 y=392812.685
setbusxy bus=263 x=390909.871 y=392809.604
setbusxy bus=280 x=390913.173 y=392805.861
setbusxy bus=373 x=390908.689 y=392801.043
setbusxy bus=379 x=390907.282 y=392801.155
setbusxy bus=507 x=390891.336 y=392807.872
setbusxy bus=458 x=390894 y=392797
setbusxy bus=391 x=390913.3067 y=392795.2978
setbusxy bus=403 x=390916.015 y=392791.999
setbusxy bus=566 x=390916.157 y=392790.648
setbusxy bus=505 x=390916.237 y=392776.136
setbusxy bus=578 x=390914.701 y=392774.115
setbusxy bus=594 x=390917.646 y=392770.357
setbusxy bus=615 x=390923.419 y=392763.338
setbusxy bus=666 x=390925.444 y=392762.018
setbusxy bus=686 x=390932.739 y=392768.301
setbusxy bus=691 x=390940.702 y=392775.184
setbusxy bus=703 x=390944.148 y=392778.217
setbusxy bus=830 x=390942.333 y=392778.516
setbusxy bus=707 x=390948.941 y=392782.353
setbusxy bus=891 x=390956.756 y=392773.691
setbusxy bus=896 x=390960 y=392774
setbusxy bus=900 x=390952 y=392766
setbusxy bus=718 x=390960.503 y=392792.29
setbusxy bus=739 x=390967.79 y=392783.707
setbusxy bus=813 x=390973 y=392785
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