clock {
timezone PST+8PDT;
stoptime '2000-01-10 00:00:00';
starttime '2000-01-01 00:00:00';
};

#include "HVAC_schedule.glm";
#include "water_schedule.glm";
#include "appliance_schedule.glm";
#define stylesheet=gridlab-d.svn.sourceforge.net/viewvc/gridlab-d/trunk/core/gridlabd-2_0;
#set minimum_timestep=60;
#set profiler=1;
#set relax_naming_rules=1;
module tape;
module climate;
module residential {
implicit_enduses NONE;
};

module powerflow {
solver_method FBS;
NR_iteration_limit 50;
};

module market;
object stubauction {
name Market_1;
object player {
property current_market.clearing_price;
loop 365;
file Price.player;
};
period 300;
};

object climate {
name "Seattle WA";
interpolate QUADRATIC;
tmyfile "WA-Seattle.tmy2";
};

object regulator_configuration {
Control MANUAL;
raise_taps 16;
name regulator_configuration_6506321;
band_center 2401;
Type A;
tap_pos_B 1;
time_delay 30.0;
connect_type 1;
regulation 0.10;
CT_phase ABC;
lower_taps 16;
tap_pos_A 1;
tap_pos_C 1;
PT_phase ABC;
band_width 50;
};

object triplex_line_configuration {
diameter 0.368;
name trip_line_config;
conductor_1 object triplex_line_conductor {
resistance 0.97;
geometric_mean_radius 0.01111;
};
conductor_2 object triplex_line_conductor {
resistance 0.97;
geometric_mean_radius 0.01111;
};
conductor_N object triplex_line_conductor {
resistance 0.97;
geometric_mean_radius 0.01111;
};
insulation_thickness 0.08;
};

object transformer_configuration {
impedance1 0.012000+0.006800j;
name fifteen_fifteen_A;
primary_voltage 4160.0V;
install_type POLETOP;
secondary_voltage 120.0V;
connect_type SINGLE_PHASE_CENTER_TAPPED;
shunt_impedance 1728000+691200j;
impedance2 0.012000+0.006800j;
impedance 0.006000+0.013600j;
power_rating 500;
};

object transformer_configuration {
power_rating 500;
primary_voltage 4160;
install_type PADMOUNT;
secondary_voltage 480;
connect_type WYE_WYE;
resistance 0.011;
reactance 0.02;
name transformer_configuration_400;
};

object node {
phases ABCN;
name 650;
bustype SWING;
voltage_B -1200.8886-2080.000j;
voltage_C -1200.8886+2080.000j;
voltage_A 2401.7771;
nominal_voltage 2401.7771;
};

object regulator {
phases ABC;
from 650;
name Reg1;
to 630;
configuration regulator_configuration_6506321;
};

object node {
phases ABCN;
name 630;
voltage_B -1200.8886-2080.000j;
voltage_C -1200.8886+2080.000j;
voltage_A 2401.7771;
nominal_voltage 2401.7771;
};

object transformer {
phases AS;
from 630;
name T1;
to tn_1;
configuration object transformer_configuration {
shunt_impedance 10000+10000j;
primary_voltage 2401.777;
install_type POLETOP;
secondary_voltage 120;
connect_type SINGLE_PHASE_CENTER_TAPPED;
impedance 0.00033+0.0022j;
powerA_rating 110 kVA;
};
groupid Distribution_Trans;
};

object transformer {
phases BS;
from 630;
name T2;
groupid Distribution_Trans;
to tn_2;
configuration object transformer_configuration {
shunt_impedance 10000+10000j;
primary_voltage 2401.777;
install_type POLETOP;
secondary_voltage 120;
connect_type SINGLE_PHASE_CENTER_TAPPED;
impedance 0.00033+0.0022j;
powerB_rating 110 kVA;
};
};

object triplex_node {
phases AS;
nominal_voltage 120;
name tn_1;
};

object triplex_meter {
phases BS;
nominal_voltage 120;
name tn_2;
};

object triplex_line {
phases AS;
from tn_1;
name tl_1;
to tm_1;
length 100;
configuration trip_line_config;
};

object triplex_line {
phases BS;
from tn_2;
name t2;
to tm_2;
length 100;
configuration trip_line_config;
};

object triplex_meter {
phases AS;
nominal_voltage 120;
name tm_1;
};

object triplex_meter {
phases BS;
nominal_voltage 120;
name tm_2;
};

object house {
auxiliary_system_type ELECTRIC;
cooling_COP 3.2;
cooling_system_type ELECTRIC;
mass_temperature 70;
auxiliary_strategy LOCKOUT;
air_temperature 70;
heating_COP 3.1;
motor_efficiency GOOD;
heating_system_type HEAT_PUMP;
object waterheater {
schedule_skew -810;
temperature 135;
tank_volume 50;
heating_element_capacity 4.8 kW;
thermostat_deadband 2.9;
location INSIDE;
demand water14*1;
tank_setpoint 136.8;
tank_UA 2.4;
};
object ZIPload {
power_fraction 0.100000;
current_fraction 0.100000;
base_power plug1*2.477490;
impedance_pf 0.950000;
current_pf 0.950000;
power_pf 0.950000;
impedance_fraction 0.800000;
groupid plugload;
};
object ZIPload {
power_fraction 0.003200;
current_fraction 0.425700;
base_power lights1*1.616013;
impedance_pf 1.000000;
current_pf -1.000000;
power_pf 1.000000;
impedance_fraction 0.571100;
groupid lights;
};
object ZIPload {
power_fraction 0.998700;
current_fraction 0.039600;
base_power television5*0.200598;
impedance_pf 0.610000;
current_pf -0.540000;
power_pf -1.000000;
impedance_fraction -0.038300;
groupid TV;
};
object ZIPload {
power_fraction 0.013500;
current_fraction 0.253400;
base_power fan1*0.106899;
impedance_pf 0.970000;
current_pf 0.950000;
power_pf -1.000000;
impedance_fraction 0.733200;
groupid fan;
};
heating_setpoint heating1*1;
schedule_skew -810;
parent tm_1;
floor_area 1838;
aux_heat_temperature_lockout 2.270706e+001;
name house1;
cooling_setpoint cooling7*1;
thermal_integrity_level 5;
motor_model BASIC;
};

object house {
auxiliary_system_type ELECTRIC;
cooling_COP 3.2;
cooling_system_type ELECTRIC;
mass_temperature 70;
auxiliary_strategy LOCKOUT;
air_temperature 70;
heating_COP 3.1;
object ZIPload {
power_fraction 0.013500;
current_fraction 0.253400;
base_power fan1*0.106899;
impedance_pf 0.970000;
current_pf 0.950000;
power_pf -1.000000;
impedance_fraction 0.733200;
groupid fan;
};
motor_efficiency GOOD;
heating_system_type HEAT_PUMP;
object waterheater {
schedule_skew -810;
temperature 135;
tank_volume 50;
heating_element_capacity 4.8 kW;
thermostat_deadband 2.9;
location INSIDE;
demand water14*1;
tank_setpoint 136.8;
tank_UA 2.4;
};
object ZIPload {
power_fraction 0.100000;
current_fraction 0.100000;
base_power plug1*2.477490;
impedance_pf 0.950000;
current_pf 0.950000;
power_pf 0.950000;
impedance_fraction 0.800000;
groupid plugload;
};
object ZIPload {
power_fraction 0.003200;
current_fraction 0.425700;
base_power lights1*1.616013;
impedance_pf 1.000000;
current_pf -1.000000;
power_pf 1.000000;
impedance_fraction 0.571100;
groupid lights;
};
object ZIPload {
power_fraction 0.998700;
current_fraction 0.039600;
base_power television5*0.200598;
impedance_pf 0.610000;
current_pf -0.540000;
power_pf -1.000000;
impedance_fraction -0.038300;
groupid TV;
};
heating_setpoint heating1*1;
parent tm_2;
floor_area 1838;
aux_heat_temperature_lockout 2.270706e+001;
name house2;
cooling_setpoint cooling7*1;
thermal_integrity_level 5;
motor_model BASIC;
};

object recorder {
interval 60;
parent Market_1;
limit 1000000;
file price_statistics.csv;
property avg24,std24,last.P,current_market.clearing_price;
};

object recorder {
interval 60;
parent Reg1;
limit 1000000;
file reg1_output.csv;
property tap_A,tap_B,tap_C,power_in_A.real,power_in_A.imag,power_in_B.real,power_in_B.imag,power_in_C.real,power_in_C.imag,power_in.real,power_in.imag;
};

object recorder {
interval 60;
parent tm_1;
limit 1000000;
file V_tm_1.csv;
property voltage_1.real,voltage_1.imag,voltage_2.real,voltage_2.imag,voltage_12.real,voltage_12.imag;
};

object recorder {
interval 60;
parent tm_2;
limit 1000000;
file V_tm_2.csv;
property voltage_1.real,voltage_1.imag,voltage_2.real,voltage_2.imag,voltage_12.real,voltage_12.imag;
};
